# OpenSim document version 30000
Model FullBody2_lee:
  publications: List of publications related to model...
  length_units: meters
  force_units: N
  gravity: 0 -9.80665 0
  credits:
    Modified version of gait2354_simbody.osim modified by Yoonsang Lee. 1) location in parent of knee joint modified to be at lower tip of femur. 2) modify talus body inertia
  defaults: Thelen2003Muscle default: min_control=0 max_control=1 optimal_force=1 max_isometric_force=546
      optimal_fiber_length=0.0535 tendon_slack_length=0.078 pennation_angle_at_optimal=0 [radians]
      max_contraction_velocity=10 activation_time_constant=0.01 deactivation_time_constant=0.04 FmaxTendonStrain=0.033
      FmaxMuscleStrain=0.6 KshapeActive=0.5 KshapePassive=4 Af=0.3 Flen=1.8
  BodySet:
    Body ground: mass=0 mass_center=(0 0 0) inertia_xx=0 inertia_yy=0 inertia_zz=0
    Body pelvis: mass=11.777 mass_center=(-0.0707 0 0) inertia_xx=0.1028 inertia_yy=0.0871 inertia_zz=0.0579
        meshes=(sacrum.vtp pelvis.vtp l_pelvis.vtp)
      CustomJoint ground_pelvis: parent_body=ground location_in_parent=(0 0 0) location=(0 0 0)
        Coordinate pelvis_tilt: motion_type=rotational default_value=0 range=(-1.570796 1.570796) clamped=false
        Coordinate pelvis_list: motion_type=rotational default_value=0 range=(-1.570796 1.570796) clamped=false
        Coordinate pelvis_rotation: motion_type=rotational default_value=0 range=(-1.570796 1.570796) clamped=false
        Coordinate pelvis_tx: motion_type=translational default_value=0 range=(-5 5) clamped=false
        Coordinate pelvis_ty: motion_type=translational default_value=0 range=(-1 2) clamped=false
        Coordinate pelvis_tz: motion_type=translational default_value=0 range=(-3 3) clamped=false
        SpatialTransform:
          TransformAxis rotation1: coordinates=pelvis_tilt axis=(0 0 1) LinearFunction(coefficients=1 0)
          TransformAxis rotation2: coordinates=pelvis_list axis=(1 0 0) LinearFunction(coefficients=1 0)
          TransformAxis rotation3: coordinates=pelvis_rotation axis=(0 1 0) LinearFunction(coefficients=1 0)
          TransformAxis translation1: coordinates=pelvis_tx axis=(1 0 0) LinearFunction(coefficients=1 0)
          TransformAxis translation2: coordinates=pelvis_ty axis=(0 1 0) LinearFunction(coefficients=1 0)
          TransformAxis translation3: coordinates=pelvis_tz axis=(0 0 1) LinearFunction(coefficients=1 0)
    Body femur_r: mass=9.3014 mass_center=(0 -0.17 0) inertia_xx=0.1339 inertia_yy=0.0351 inertia_zz=0.1412
        meshes=femur.vtp
      CustomJoint hip_r: parent_body=pelvis location_in_parent=(-0.0707 -0.0661 0.0835) location=(0 0 0)
        Coordinate hip_flexion_r: motion_type=rotational default_value=0 range=(-2.094395 2.094395) clamped=false
        Coordinate hip_adduction_r: motion_type=rotational default_value=0 range=(-2.094395 2.094395) clamped=false
        Coordinate hip_rotation_r: motion_type=rotational default_value=0 range=(-2.094395 2.094395) clamped=false
        SpatialTransform: axes_held_at_zero=(translation1 translation2 translation3)
          TransformAxis rotation1: coordinates=hip_flexion_r axis=(0 0 1) LinearFunction(coefficients=1 0)
          TransformAxis rotation2: coordinates=hip_adduction_r axis=(1 0 0) LinearFunction(coefficients=1 0)
          TransformAxis rotation3: coordinates=hip_rotation_r axis=(0 1 0) LinearFunction(coefficients=1 0)
    Body tibia_r: mass=3.7075 mass_center=(0 -0.1867 0) inertia_xx=0.0504 inertia_yy=0.0051 inertia_zz=0.0511
        meshes=(tibia.vtp fibula.vtp)
      PinJoint knee_r: parent_body=femur_r location_in_parent=(0 -0.396 0) location=(0 0 0)
        Coordinate knee_angle_r: motion_type=rotational default_value=0 range=(-2.094395 0.1745329) clamped=false
        SpatialTransform: axes_held_at_zero=(rotation2 rotation3 translation3)
          TransformAxis rotation1: coordinates=knee_angle_r axis=(0 0 1) LinearFunction(coefficients=1 0)
          TransformAxis translation1: coordinates=knee_angle_r axis=(1 0 0)
            SimmSpline: x=(-2.0944 -1.74533 -1.39626 -1.0472 -0.698132 -0.349066 -0.174533 0.197344 0.337395 0.490178 1.52146 2.0944)
                y=(-0.0032 0.00179 0.00411 0.0041 0.00212 -0.001 -0.0031 -0.005227 -0.005435 -0.005574 -0.005435 -0.00525)
          TransformAxis translation2: coordinates=knee_angle_r axis=(0 1 0)
            SimmSpline: x=(-2.0944 -1.22173 -0.523599 -0.349066 -0.174533 0.159149 2.0944)
                y=(-0.0266 -0.0122 -0.003 -0.0016 -0.0006 0.000736 0)
    Body talus_r: mass=1.35 mass_center=(0.04743519 -0.01106481 0.00733333) inertia_xx=0.00377816 inertia_yy=0.00705155
        inertia_zz=0.00937289 inertia_xy=-0.00255738 inertia_xz=0.00048282 inertia_yz=0.0004153
        meshes=(talus.vtp foot_attachedto_talus_r.vtp)
      CustomJoint ankle_r: parent_body=tibia_r location_in_parent=(0 -0.43 0) location=(0 0 0)
        Coordinate ankle_angle_r: motion_type=rotational default_value=0 initial_value=0 range=(-1.570796 1.570796)
            clamped=false
        SpatialTransform: axes_held_at_zero=(rotation2 rotation3 translation1 translation2 translation3)
          TransformAxis rotation1: coordinates=ankle_angle_r axis=(-0.1050135 -0.1740224 0.9791263)
              LinearFunction(coefficients=1 0)
    Body toes_r: mass=0.2166 mass_center=(0.0346 0.006 -0.0175) inertia_xx=0.0001 inertia_yy=0.0002 inertia_zz=0.0001
        meshes=bofoot.vtp
      PinJoint mtp_r: parent_body=talus_r location_in_parent=(0.13003 -0.04395 0.009) location=(0 0 0)
        Coordinate mtp_angle_r: motion_type=rotational default_value=0 initial_value=0 range=(-1.570796 1.570796)
            clamped=false
        SpatialTransform: axes_held_at_zero=(rotation2 rotation3 translation1 translation2 translation3)
          TransformAxis rotation1: coordinates=mtp_angle_r axis=(-0.5809544 0 0.8139361)
              LinearFunction(coefficients=1 0)
    Body femur_l: mass=9.3014 mass_center=(0 -0.17 0) inertia_xx=0.1339 inertia_yy=0.0351 inertia_zz=0.1412
        meshes=l_femur.vtp
      CustomJoint hip_l: parent_body=pelvis location_in_parent=(-0.0707 -0.0661 -0.0835) location=(0 0 0)
        Coordinate hip_flexion_l: motion_type=rotational default_value=0 range=(-2.094395 2.094395) clamped=false
        Coordinate hip_adduction_l: motion_type=rotational default_value=0 range=(-2.094395 2.094395) clamped=false
        Coordinate hip_rotation_l: motion_type=rotational default_value=0 range=(-2.094395 2.094395) clamped=false
        SpatialTransform: axes_held_at_zero=(translation1 translation2 translation3)
          TransformAxis rotation1: coordinates=hip_flexion_l axis=(0 0 1) LinearFunction(coefficients=1 0)
          TransformAxis rotation2: coordinates=hip_adduction_l axis=(-1 0 0) LinearFunction(coefficients=1 0)
          TransformAxis rotation3: coordinates=hip_rotation_l axis=(0 -1 0) LinearFunction(coefficients=1 0)
    Body tibia_l: mass=3.7075 mass_center=(0 -0.1867 0) inertia_xx=0.0504 inertia_yy=0.0051 inertia_zz=0.0511
        meshes=(l_tibia.vtp l_fibula.vtp)
      PinJoint knee_l: parent_body=femur_l location_in_parent=(0 -0.396 0) location=(0 0 0)
        Coordinate knee_angle_l: motion_type=rotational default_value=0 range=(-2.094395 0.1745329) clamped=false
        SpatialTransform: axes_held_at_zero=(rotation2 rotation3 translation3)
          TransformAxis rotation1: coordinates=knee_angle_l axis=(0 0 1) LinearFunction(coefficients=1 0)
          TransformAxis translation1: coordinates=knee_angle_l axis=(1 0 0)
            SimmSpline: x=(-2.0944 -1.74533 -1.39626 -1.0472 -0.698132 -0.349066 -0.174533 0.197344 0.337395 0.490178 1.52146 2.0944)
                y=(-0.0032 0.00179 0.00411 0.0041 0.00212 -0.001 -0.0031 -0.005227 -0.005435 -0.005574 -0.005435 -0.00525)
          TransformAxis translation2: coordinates=knee_angle_l axis=(0 1 0)
            SimmSpline: x=(-2.0944 -1.22173 -0.523599 -0.349066 -0.174533 0.159149 2.0944)
                y=(-0.0266 -0.0122 -0.003 -0.0016 -0.0006 0.000736 0)
    Body talus_l: mass=1.35 mass_center=(0.04743519 -0.01106481 -0.00733333) inertia_xx=0.00377816
        inertia_yy=0.00705155 inertia_zz=0.00937289 inertia_xy=-0.00255738 inertia_xz=-0.00048282 inertia_yz=-0.0004153
        meshes=(l_talus.vtp l_foot_attachedto_talus_l.vtp)
      CustomJoint ankle_l: parent_body=tibia_l location_in_parent=(0 -0.43 0) location=(0 0 0)
        Coordinate ankle_angle_l: motion_type=rotational default_value=0 initial_value=0 range=(-1.047198 1.047198)
            clamped=false
        SpatialTransform: axes_held_at_zero=(rotation2 rotation3 translation1 translation2 translation3)
          TransformAxis rotation1: coordinates=ankle_angle_l axis=(0.1050135 0.1740224 0.9791263)
              LinearFunction(coefficients=1 0)
    Body toes_l: mass=0.2166 mass_center=(0.0346 0.006 0.0175) inertia_xx=0.0001 inertia_yy=0.0002 inertia_zz=0.0001
        meshes=l_bofoot.vtp
      PinJoint mtp_l: parent_body=talus_l location_in_parent=(0.13003 -0.04395 -0.009) location=(0 0 0)
        Coordinate mtp_angle_l: motion_type=rotational default_value=0 initial_value=0 range=(-1.047198 1.047198)
            clamped=false
        SpatialTransform: axes_held_at_zero=(rotation2 rotation3 translation1 translation2 translation3)
          TransformAxis rotation1: coordinates=mtp_angle_l axis=(0.5809544 0 0.8139361)
              LinearFunction(coefficients=1 0)
    Body thorax: mass=26.6266 mass_center=(-0.03 0.32 0) inertia_xx=1.4745 inertia_yy=0.7555 inertia_zz=1.4314
        meshes=(clavicle.vtp scapula.vtp clavicle_l.vtp scapula_l.vtp thorax.vtp hat_skull.vtp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)
      CustomJoint back: parent_body=pelvis location_in_parent=(-0.1007 0.0815 0) location=(-0.0207 -0.3785 0)
        Coordinate lumbar_extension: motion_type=rotational default_value=0 initial_value=0 range=(-1.570796 1.570796)
            clamped=false
        Coordinate lumbar_bending: motion_type=rotational default_value=0 initial_value=0 range=(-1.570796 1.570796)
            clamped=false
        Coordinate lumbar_rotation: motion_type=rotational default_value=0 initial_value=0 range=(-1.570796 1.570796)
            clamped=false
        SpatialTransform: axes_held_at_zero=(translation1 translation2 translation3)
          TransformAxis rotation1: coordinates=lumbar_extension axis=(0 0 1) LinearFunction(coefficients=1 0)
          TransformAxis rotation2: coordinates=lumbar_bending axis=(1 0 0) LinearFunction(coefficients=1 0)
          TransformAxis rotation3: coordinates=lumbar_rotation axis=(0 1 0) LinearFunction(coefficients=1 0)
      # [>Name of the parent body to which this joint connects its owner body.<]
      # [>Location of the joint in the parent body specified in the parent reference frame. Default is (0,0,0).<]
      # [>Orientation of the joint in the parent body specified in the parent reference frame. Euler XYZ body-fixed rotation angles are used to express the orientation. Default is (0,0,0).<]
      # [>Location of the joint in the child body specified in the child reference frame. For SIMM models, this vector is always the zero vector (i.e., the body reference frame coincides with the joint). <]
      # [>Orientation of the joint in the owing body specified in the owning body reference frame.  Euler XYZ body-fixed rotation angles are used to express the orientation. <]
      # [>Set holding the generalized coordinates (q's) that parmeterize this joint.<]
      # [>Coordinate can describe rotational, translational, or coupled motion. Defaults to rotational.<]
      # [>The value of this coordinate before any value has been set. Rotational coordinate value is in radians and Translational in meters.<]
      # [>The speed value of this coordinate before any value has been set. Rotational coordinate value is in rad/s and Translational in m/s.<]
      # [>The minimum and maximum values that the coordinate can range between. Rotational coordinate range in radians and Translational in meters.<]
      # [>Flag indicating whether or not the values of the coordinates should be limited to the range, above.<]
      # [>Flag indicating whether or not the values of the coordinates should be constrained to the current (e.g. default) value, above.<]
      # [>If specified, the coordinate can be prescribed by a function of time. It can be any OpenSim Function with valid second order derivatives.<]
      # [>Flag indicating whether or not the values of the coordinates should be prescribed according to the function above. It is ignored if the no prescribed function is specified.<]
      # [>Coordinate can describe rotational, translational, or coupled motion. Defaults to rotational.<]
      # [>The value of this coordinate before any value has been set. Rotational coordinate value is in radians and Translational in meters.<]
      # [>The speed value of this coordinate before any value has been set. Rotational coordinate value is in rad/s and Translational in m/s.<]
      # [>The minimum and maximum values that the coordinate can range between. Rotational coordinate range in radians and Translational in meters.<]
      # [>Flag indicating whether or not the values of the coordinates should be limited to the range, above.<]
      # [>Flag indicating whether or not the values of the coordinates should be constrained to the current (e.g. default) value, above.<]
      # [>If specified, the coordinate can be prescribed by a function of time. It can be any OpenSim Function with valid second order derivatives.<]
      # [>Flag indicating whether or not the values of the coordinates should be prescribed according to the function above. It is ignored if the no prescribed function is specified.<]
      # [>Coordinate can describe rotational, translational, or coupled motion. Defaults to rotational.<]
      # [>The value of this coordinate before any value has been set. Rotational coordinate value is in radians and Translational in meters.<]
      # [>The speed value of this coordinate before any value has been set. Rotational coordinate value is in rad/s and Translational in m/s.<]
      # [>The minimum and maximum values that the coordinate can range between. Rotational coordinate range in radians and Translational in meters.<]
      # [>Flag indicating whether or not the values of the coordinates should be limited to the range, above.<]
      # [>Flag indicating whether or not the values of the coordinates should be constrained to the current (e.g. default) value, above.<]
      # [>If specified, the coordinate can be prescribed by a function of time. It can be any OpenSim Function with valid second order derivatives.<]
      # [>Flag indicating whether or not the values of the coordinates should be prescribed according to the function above. It is ignored if the no prescribed function is specified.<]
      # [>Coordinate can describe rotational, translational, or coupled motion. Defaults to rotational.<]
      # [>The value of this coordinate before any value has been set. Rotational coordinate value is in radians and Translational in meters.<]
      # [>The speed value of this coordinate before any value has been set. Rotational coordinate value is in rad/s and Translational in m/s.<]
      # [>The minimum and maximum values that the coordinate can range between. Rotational coordinate range in radians and Translational in meters.<]
      # [>Flag indicating whether or not the values of the coordinates should be limited to the range, above.<]
      # [>Flag indicating whether or not the values of the coordinates should be constrained to the current (e.g. default) value, above.<]
      # [>If specified, the coordinate can be prescribed by a function of time. It can be any OpenSim Function with valid second order derivatives.<]
      # [>Flag indicating whether or not the values of the coordinates should be prescribed according to the function above. It is ignored if the no prescribed function is specified.<]
      # [>Coordinate can describe rotational, translational, or coupled motion. Defaults to rotational.<]
      # [>The value of this coordinate before any value has been set. Rotational coordinate value is in radians and Translational in meters.<]
      # [>The speed value of this coordinate before any value has been set. Rotational coordinate value is in rad/s and Translational in m/s.<]
      # [>The minimum and maximum values that the coordinate can range between. Rotational coordinate range in radians and Translational in meters.<]
      # [>Flag indicating whether or not the values of the coordinates should be limited to the range, above.<]
      # [>Flag indicating whether or not the values of the coordinates should be constrained to the current (e.g. default) value, above.<]
      # [>If specified, the coordinate can be prescribed by a function of time. It can be any OpenSim Function with valid second order derivatives.<]
      # [>Flag indicating whether or not the values of the coordinates should be prescribed according to the function above. It is ignored if the no prescribed function is specified.<]
      # [>Coordinate can describe rotational, translational, or coupled motion. Defaults to rotational.<]
      # [>The value of this coordinate before any value has been set. Rotational coordinate value is in radians and Translational in meters.<]
      # [>The speed value of this coordinate before any value has been set. Rotational coordinate value is in rad/s and Translational in m/s.<]
      # [>The minimum and maximum values that the coordinate can range between. Rotational coordinate range in radians and Translational in meters.<]
      # [>Flag indicating whether or not the values of the coordinates should be limited to the range, above.<]
      # [>Flag indicating whether or not the values of the coordinates should be constrained to the current (e.g. default) value, above.<]
      # [>If specified, the coordinate can be prescribed by a function of time. It can be any OpenSim Function with valid second order derivatives.<]
      # [>Flag indicating whether or not the values of the coordinates should be prescribed according to the function above. It is ignored if the no prescribed function is specified.<]
      # [>Whether the joint transform defines parent->child or child->parent.<]
      # [>Defines how the child body moves with respect to the parent as a function of the generalized coordinates.<]
      # [>3 Axes for rotations are listed first.<]
      # [>Names of the coordinates that serve as the independent variables         of the transform function.<]
      # [>Rotation or translation axis for the transform.<]
      # [>Transform function of the generalized coordinates used to        represent the amount of transformation along a specified axis.<]
      # [>Names of the coordinates that serve as the independent variables         of the transform function.<]
      # [>Rotation or translation axis for the transform.<]
      # [>Transform function of the generalized coordinates used to        represent the amount of transformation along a specified axis.<]
      # [>Names of the coordinates that serve as the independent variables         of the transform function.<]
      # [>Rotation or translation axis for the transform.<]
      # [>Transform function of the generalized coordinates used to        represent the amount of transformation along a specified axis.<]
      # [>3 Axes for translations are listed next.<]
      # [>Names of the coordinates that serve as the independent variables         of the transform function.<]
      # [>Rotation or translation axis for the transform.<]
      # [>Transform function of the generalized coordinates used to        represent the amount of transformation along a specified axis.<]
      # [>Names of the coordinates that serve as the independent variables         of the transform function.<]
      # [>Rotation or translation axis for the transform.<]
      # [>Transform function of the generalized coordinates used to        represent the amount of transformation along a specified axis.<]
      # [>Names of the coordinates that serve as the independent variables         of the transform function.<]
      # [>Rotation or translation axis for the transform.<]
      # [>Transform function of the generalized coordinates used to        represent the amount of transformation along a specified axis.<]
      WrapEllipsoid Deltoid2: xyz_body_rotation=(3.13042 -1.54881 -1.31423) translation=(-0.013805 -0.0108 0.1706)
          active=false quadrant=-y dimensions=(0.03 0.04 0.035)
      WrapTorus Delt3: xyz_body_rotation=(0.620988 0.32882 -0.560774) translation=(-0.105305 -0.0158 0.124)
          active=false quadrant=all inner_radius=0.04 outer_radius=0.06
      WrapTorus INFSP: xyz_body_rotation=(0.0253073 0.58835 0.151844) translation=(-0.064105 0.0071 0.1498)
          quadrant=all inner_radius=0.008 outer_radius=0.019
      WrapEllipsoid TMIN: xyz_body_rotation=(-2.09754 -0.280823 -1.76348) translation=(-0.049805 -0.0249 0.1251)
          quadrant=x dimensions=(0.03 0.03 0.05)
      WrapCylinder TRIlongglen: xyz_body_rotation=(1.37532 -0.294612 2.43596) translation=(-0.043905 -0.0039 0.1478)
          quadrant=x radius=0.003 length=0.03
      WrapEllipsoid Deltoid2_l: xyz_body_rotation=(-3.13042 1.54881 -1.31423) translation=(-0.013805 -0.0108 -0.1706)
          active=false quadrant=-y dimensions=(0.03 0.04 0.035)
      WrapTorus Delt3_l: xyz_body_rotation=(-0.620988 -0.32882 -0.560774) translation=(-0.105305 -0.0158 -0.124)
          active=false quadrant=all inner_radius=0.04 outer_radius=0.06
      WrapTorus INFSP_l: xyz_body_rotation=(-0.0253073 -0.58835 0.151844) translation=(-0.064105 0.0071 -0.1498)
          quadrant=all inner_radius=0.008 outer_radius=0.019
      WrapEllipsoid TMIN_l: xyz_body_rotation=(2.09754 0.280823 -1.76348) translation=(-0.049805 -0.0249 -0.1251)
          quadrant=x dimensions=(0.03 0.03 0.05)
      WrapCylinder TRIlongglen_l: xyz_body_rotation=(-1.37532 0.294612 2.43596) translation=(-0.043905 -0.0039 -0.1478)
          quadrant=x radius=0.003 length=0.03
      WrapEllipsoid Thorax: xyz_body_rotation=(0.0434587 -0.331962 0.189892) translation=(-0.0386 -0.1273 0.0709)
          quadrant=all dimensions=(0.1 0.135 0.08)
      WrapEllipsoid Thorax_l: xyz_body_rotation=(-0.0434587 0.331962 0.189892) translation=(-0.0386 -0.1273 -0.0709)
          quadrant=all dimensions=(0.1 0.135 0.08)
    Body humerus: mass=2.0325 mass_center=(0 -0.164502 0) inertia_xx=0.011946 inertia_yy=0.004121 inertia_zz=0.013409
        meshes=humerus.vtp
      CustomJoint shoulder2: parent_body=thorax location_in_parent=(-0.0176 -0.007 0.17) location=(0 0 0)
        Coordinate shoulder_elv: motion_type=rotational default_value=0 range=(0 2.007129) clamped=true
        Coordinate shoulder_rot: motion_type=rotational default_value=0 default_speed_value=1.000209e-14
            range=(-0.7853982 0.7853982) clamped=true
        Coordinate elv_angle: motion_type=rotational default_value=0 default_speed_value=5.342924e-15
            range=(-1.570796 1.570796) clamped=true
        SpatialTransform: axes_held_at_zero=(translation1 translation2 translation3)
          TransformAxis rotation1: coordinates=shoulder_elv axis=(-0.9982614 0.0023 0.05889802)
              LinearFunction(coefficients=1 0)
          TransformAxis rotation2: coordinates=shoulder_rot axis=(0.0048 0.9990892 0.04240001)
              LinearFunction(coefficients=1 0)
          TransformAxis rotation3: coordinates=elv_angle axis=(0.0048 0.04240001 0.9990892)
              LinearFunction(coefficients=1 0)
      WrapEllipsoid DELT1hh: xyz_body_rotation=(0.0584685 1.00461 0.570374) translation=(-0.0139 -0.0127 -0.0262)
          quadrant=z dimensions=(0.03 0.1 0.05)
      WrapCylinder delt2hum: xyz_body_rotation=(1.68093 -0.0249582 0.0516617) translation=(0.0017 -0.0958 0.0011)
          quadrant=all radius=0.0094 length=0.05
      WrapEllipsoid delt3hum: xyz_body_rotation=(1.72735 0.0759218 -2.74313) translation=(0.0019 -0.0592 0.0011)
          quadrant=x dimensions=(0.01 0.01 0.05)
      WrapEllipsoid SUPSP: xyz_body_rotation=(0.0380482 0.00855211 -1.30673) translation=(0.0002 0.0077 0.0043)
          quadrant=all dimensions=(0.02 0.02 0.02)
      WrapEllipsoid INFSP_and_TMIN_hum_head: xyz_body_rotation=(-0.286583 -0.00907571 -0.0684169)
          translation=(-0.0003 0.0026 0.0038) quadrant=all dimensions=(0.02 0.025 0.02)
      WrapEllipsoid SUBSCAP: xyz_body_rotation=(-0.924501 0.288852 0.381529) translation=(-0.0025 0.0007 -0.0045)
          quadrant=all dimensions=(0.02 0.017 0.028)
      WrapCylinder TMINhum: xyz_body_rotation=(1.75353 0.0692896 2.74628) translation=(-0.0014 -0.0455 0) quadrant=x
          radius=0.007 length=0.07
      WrapSphere TMAJ_LAT_PEC_CORBhh: translation=(0.0007 0 0.006) quadrant=all radius=0.03
      WrapCylinder TMAJ_LAThum: xyz_body_rotation=(1.53641 -0.0637045 1.41424) translation=(0.0007 -0.0443 -0.0055)
          quadrant=-x radius=0.007 length=0.04
      WrapEllipsoid PEC1hh: xyz_body_rotation=(-0.620465 -0.310494 0.363727) translation=(-0.0037 0.0005 -0.0025)
          quadrant=-z dimensions=(0.03 0.02 0.02)
      WrapCylinder PEC12hum: xyz_body_rotation=(1.55928 -0.0774926 -0.925897) translation=(0.002 -0.0508 -0.0017)
          quadrant=x radius=0.009 length=0.07
      WrapSphere PEC23hh: translation=(-0.0086 0.0021 -0.0004) quadrant=all radius=0.02
      WrapCylinder PEC3hum: xyz_body_rotation=(1.44094 -0.0561996 1.75196) translation=(0.0009 -0.0551 -0.0004)
          quadrant=-x radius=0.008 length=0.07
      WrapCylinder LAT_TMAJhh: xyz_body_rotation=(-0.305084 -0.018326 -0.686613) translation=(-0.0224 0.0102 0.0094)
          quadrant=-y radius=0.007 length=0.045
      WrapSphere LAT_TMAJ2hh: xyz_body_rotation=(-0.127235 0.276111 0.0197222) translation=(-0.0016 0.0092 0.0052)
          quadrant=-z radius=0.03
      WrapCylinder CORBhum: xyz_body_rotation=(-1.60832 0.0959931 0.875283) translation=(0.0027 -0.1202 -0.0059)
          quadrant=x radius=0.008 length=0.05
      WrapEllipsoid TRIlonghh: xyz_body_rotation=(3.00162 -0.853466 2.57419) translation=(-0.0078 -0.0041 -0.0014)
          quadrant=z dimensions=(0.035 0.02 0.02)
      WrapCylinder TRI: xyz_body_rotation=(-0.14015 -0.00628319 0.154985) translation=(0.0028 -0.2919 -0.0119)
          quadrant=all radius=0.016 length=0.04
      WrapEllipsoid ANC: xyz_body_rotation=(0.00750492 -0.196699 1.04929) translation=(0.0134 -0.2861 -0.0008)
          quadrant=-x dimensions=(0.02 0.02 0.02)
      WrapEllipsoid BIClong: xyz_body_rotation=(-2.00434 -1.00164 0.975465) translation=(0.0033 0.0073 0.0003)
          quadrant=-y dimensions=(0.025 0.02 0.02)
      WrapEllipsoid Elbow_BIC_BRD: xyz_body_rotation=(-0.128631 0.137532 0.0307178) translation=(0.0019 -0.289 -0.014)
          quadrant=x dimensions=(0.015 0.015 0.1)
      WrapEllipsoid Elbow_PT_ECRL: xyz_body_rotation=(-0.161094 -0.110828 0.61453) translation=(0.003 -0.2872 -0.0069)
          quadrant=x dimensions=(0.018 0.025 0.035)
    Body ulna: mass=0.6075 mass_center=(0 -0.120525 0) inertia_xx=0.002962 inertia_yy=0.000618 inertia_zz=0.003213
        meshes=ulna.vtp
      PinJoint elbow: parent_body=humerus location_in_parent=(0.0061 -0.2904 -0.0123) location=(0 0 0)
        Coordinate elbow_flexion: motion_type=rotational default_value=0 default_speed_value=-6.440243e-14
            range=(0 2.268928) clamped=true
        SpatialTransform: axes_held_at_zero=(rotation2 rotation3 translation1 translation2 translation3)
          TransformAxis rotation1: coordinates=elbow_flexion axis=(0.04940001 0.03660001 0.9981083)
              LinearFunction(coefficients=1 0)
    Body radius: mass=0.6075 mass_center=(0 -0.120525 0) inertia_xx=0.002962 inertia_yy=0.000618 inertia_zz=0.003213
        meshes=radius.vtp
      WeldJoint radioulnar: parent_body=ulna location_in_parent=(0.0004 -0.011503 0.019999) location=(0 0 0)
        Coordinate pro_sup: motion_type=rotational default_value=0 range=(-1.570796 1.570796) clamped=true locked=true
        SpatialTransform: axes_held_at_zero=(rotation2 rotation3 translation1 translation2 translation3)
          TransformAxis rotation1: coordinates=pro_sup axis=(-0.01716099 0.9926656 -0.119668)
              LinearFunction(coefficients=1 0)
      WrapTorus ECU: xyz_body_rotation=(-0.986635 -0.148877 0.222704) translation=(-0.0163 -0.2417 0.0349) quadrant=all
          inner_radius=0.006 outer_radius=0.009
    Body hand_r: mass=0.4575 mass_center=(0 -0.068095 0) inertia_xx=0.000892 inertia_yy=0.000547 inertia_zz=0.00134
        meshes=(pisiform.vtp lunate.vtp scaphoid.vtp triquetrum.vtp hamate.vtp capitate.vtp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)
      CustomJoint radius_hand_r: parent_body=radius location_in_parent=(0.018 -0.242 0.025) location=(0 0 0)
        Coordinate wrist_dev_r: motion_type=rotational default_value=0 range=(-0.4363323 0.6108652) clamped=true
            locked=true
        Coordinate wrist_flex_r: motion_type=rotational default_value=0 range=(-1.22173 1.22173) clamped=true
            locked=true
        SpatialTransform: axes_held_at_zero=(rotation3 translation1 translation2 translation3)
          TransformAxis rotation1: coordinates=wrist_dev_r axis=(-0.819064 -0.135611 -0.557444)
            SimmSpline: x=(-0.174533 0 0.436332) y=(-0.174533 0 0.436332)
          TransformAxis rotation2: coordinates=wrist_flex_r axis=(0.9564267 -0.2522069 0.147104)
            SimmSpline: x=(-1.5708 1.5708) y=(-0.785398 0.785398)
      WrapTorus ECRL: xyz_body_rotation=(1.53833 0.234398 0.731118) translation=(0.0222 -0.0096 0.0208) quadrant=all
          inner_radius=0.008 outer_radius=0.016
      WrapTorus ECRB: xyz_body_rotation=(1.31266 -0.11781 -0.116239) translation=(0.0126 -0.0095 0.0186) quadrant=all
          inner_radius=0.008 outer_radius=0.01
      WrapTorus FCR: xyz_body_rotation=(-1.55596 -0.15324 -0.100007) translation=(0.0032 -0.0045 -0.019) quadrant=all
          inner_radius=0.001 outer_radius=0.0025
      WrapTorus FCU: xyz_body_rotation=(-1.57376 -0.0797616 0.39235) translation=(-0.0123 -0.0124 -0.0171) quadrant=all
          inner_radius=0.0068 outer_radius=0.008
    Body humerus_l: mass=2.0325 mass_center=(0 -0.164502 0) inertia_xx=0.011946 inertia_yy=0.004121 inertia_zz=0.013409
        meshes=humerus_l.vtp
      CustomJoint shoulder2_l: parent_body=thorax location_in_parent=(-0.0176 -0.007 -0.17) location=(0 0 0)
        Coordinate shoulder_elv_l: motion_type=rotational default_value=0 default_speed_value=9.175375e-22
            range=(0 2.007129) clamped=true locked=true
        Coordinate shoulder_rot_l: motion_type=rotational default_value=0 range=(-0.7853982 0.7853982) clamped=true
            locked=true
        Coordinate elv_angle_l: motion_type=rotational default_value=0 range=(-1.570796 1.570796) clamped=true
            locked=true
        SpatialTransform: axes_held_at_zero=(translation1 translation2 translation3)
          TransformAxis rotation1: coordinates=shoulder_elv_l axis=(0.9982614 -0.0023 0.05889802)
              LinearFunction(coefficients=1 0)
          TransformAxis rotation2: coordinates=shoulder_rot_l axis=(-0.0048 -0.9990892 0.04240001)
              LinearFunction(coefficients=1 0)
          TransformAxis rotation3: coordinates=elv_angle_l axis=(-0.0048 -0.04240001 0.9990892)
              LinearFunction(coefficients=1 0)
      WrapEllipsoid DELT1hh_l: xyz_body_rotation=(-0.0584685 -1.00461 0.570374) translation=(-0.0139 -0.0127 0.0262)
          quadrant=-z dimensions=(0.03 0.1 0.05)
      WrapCylinder delt2hum_l: xyz_body_rotation=(-1.68093 0.0249582 0.0516617) translation=(0.0017 -0.0958 -0.0011)
          quadrant=all radius=0.0094 length=0.05
      WrapEllipsoid delt3hum_l: xyz_body_rotation=(-1.72735 -0.0759218 -2.74313) translation=(0.0019 -0.0592 -0.0011)
          quadrant=x dimensions=(0.01 0.01 0.05)
      WrapEllipsoid SUPSP_l: xyz_body_rotation=(-0.0380482 -0.00855211 -1.30673) translation=(0.0002 0.0077 -0.0043)
          quadrant=all dimensions=(0.02 0.02 0.02)
      WrapEllipsoid INFSP_and_TMIN_hum_head_l: xyz_body_rotation=(0.286583 0.00907571 -0.0684169)
          translation=(-0.0003 0.0026 -0.0038) quadrant=all dimensions=(0.02 0.025 0.02)
      WrapEllipsoid SUBSCAP_l: xyz_body_rotation=(0.924501 -0.288852 0.381529) translation=(-0.0025 0.0007 0.0045)
          quadrant=all dimensions=(0.02 0.017 0.028)
      WrapCylinder TMINhum_l: xyz_body_rotation=(-1.75353 -0.0692896 2.74628) translation=(-0.0014 -0.0455 0)
          quadrant=x radius=0.007 length=0.07
      WrapSphere TMAJ_LAT_PEC_CORBhh_l: translation=(0.0007 0 -0.006) quadrant=all radius=0.03
      WrapCylinder TMAJ_LAThum_l: xyz_body_rotation=(-1.53641 0.0637045 1.41424) translation=(0.0007 -0.0443 0.0055)
          quadrant=-x radius=0.007 length=0.04
      WrapEllipsoid PEC1hh_l: xyz_body_rotation=(0.620465 0.310494 0.363727) translation=(-0.0037 0.0005 0.0025)
          quadrant=z dimensions=(0.03 0.02 0.02)
      WrapCylinder PEC12hum_l: xyz_body_rotation=(-1.55928 0.0774926 -0.925897) translation=(0.002 -0.0508 0.0017)
          quadrant=x radius=0.009 length=0.07
      WrapSphere PEC23hh_l: translation=(-0.0086 0.0021 0.0004) quadrant=all radius=0.02
      WrapCylinder PEC3hum_l: xyz_body_rotation=(-1.44094 0.0561996 1.75196) translation=(0.0009 -0.0551 0.0004)
          quadrant=-x radius=0.008 length=0.07
      WrapCylinder LAT_TMAJhh_l: xyz_body_rotation=(0.305084 0.018326 -0.686613) translation=(-0.0224 0.0102 -0.0094)
          quadrant=-y radius=0.007 length=0.045
      WrapSphere LAT_TMAJ2hh_l: xyz_body_rotation=(0.127235 -0.276111 0.0197222) translation=(-0.0016 0.0092 -0.0052)
          quadrant=z radius=0.03
      WrapCylinder CORBhum_l: xyz_body_rotation=(1.60832 -0.0959931 0.875283) translation=(0.0027 -0.1202 0.0059)
          quadrant=x radius=0.008 length=0.05
      WrapEllipsoid TRIlonghh_l: xyz_body_rotation=(-3.00162 0.853466 2.57419) translation=(-0.0078 -0.0041 0.0014)
          quadrant=-z dimensions=(0.035 0.02 0.02)
      WrapCylinder TRI_l: xyz_body_rotation=(0.14015 0.00628319 0.154985) translation=(0.0028 -0.2919 0.0119)
          quadrant=all radius=0.016 length=0.04
      WrapEllipsoid ANC_l: xyz_body_rotation=(-0.00750492 0.196699 1.04929) translation=(0.0134 -0.2861 0.0008)
          quadrant=-x dimensions=(0.02 0.02 0.02)
      WrapEllipsoid BIClong_l: xyz_body_rotation=(2.00434 1.00164 0.975465) translation=(0.0033 0.0073 -0.0003)
          quadrant=-y dimensions=(0.025 0.02 0.02)
      WrapEllipsoid Elbow_BIC_BRD_l: xyz_body_rotation=(0.128631 -0.137532 0.0307178) translation=(0.0019 -0.289 0.014)
          quadrant=x dimensions=(0.015 0.015 0.1)
      WrapEllipsoid Elbow_PT_ECRL_l: xyz_body_rotation=(0.161094 0.110828 0.61453) translation=(0.003 -0.2872 0.0069)
          quadrant=x dimensions=(0.018 0.025 0.035)
    Body ulna_l: mass=0.6075 mass_center=(0 -0.120525 0) inertia_xx=0.002962 inertia_yy=0.000618 inertia_zz=0.003213
        meshes=ulna_l.vtp
      PinJoint elbow_l: parent_body=humerus_l location_in_parent=(0.0061 -0.2904 0.0123) location=(0 0 0)
        Coordinate elbow_flexion_l: motion_type=rotational default_value=0 range=(0 2.268928) clamped=true locked=true
        SpatialTransform: axes_held_at_zero=(rotation2 rotation3 translation1 translation2 translation3)
          TransformAxis rotation1: coordinates=elbow_flexion_l axis=(-0.04940001 -0.03660001 0.9981083)
              LinearFunction(coefficients=1 0)
    Body radius_l: mass=0.6075 mass_center=(0 -0.120525 0) inertia_xx=0.002962 inertia_yy=0.000618 inertia_zz=0.003213
        meshes=radius_l.vtp
      WeldJoint radioulnar_l: parent_body=ulna_l location_in_parent=(0.0004 -0.011503 -0.019999) location=(0 0 0)
        Coordinate pro_sup_l: motion_type=rotational default_value=0 range=(-1.570796 1.570796) clamped=true
            locked=true
        SpatialTransform: axes_held_at_zero=(rotation2 rotation3 translation1 translation2 translation3)
          TransformAxis rotation1: coordinates=pro_sup_l axis=(0.01716099 -0.9926656 -0.119668)
              LinearFunction(coefficients=1 0)
      WrapTorus ECU_l: xyz_body_rotation=(0.986635 0.148877 0.222704) translation=(-0.0163 -0.2417 -0.0349)
          quadrant=all inner_radius=0.006 outer_radius=0.009
    Body hand_l: mass=0.4575 mass_center=(0 -0.068095 0) inertia_xx=0.000892 inertia_yy=0.000547 inertia_zz=0.00134
        meshes=(pisiform_l.vtp lunate_l.vtp scaphoid_l.vtp triquetrum_l.vtp hamate_l.vtp capitate_l.vtp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)
      CustomJoint radius_hand_l: parent_body=radius_l location_in_parent=(0.018 -0.242 -0.025) location=(0 0 0)
        Coordinate wrist_dev_l: motion_type=rotational default_value=0 range=(-0.4363323 0.6108652) clamped=true
            locked=true
        Coordinate wrist_flex_l: motion_type=rotational default_value=0 range=(-1.22173 1.22173) clamped=true
            locked=true
        SpatialTransform: axes_held_at_zero=(rotation3 translation1 translation2 translation3)
          TransformAxis rotation1: coordinates=wrist_dev_l axis=(-0.819064 -0.135611 -0.557444)
            SimmSpline: x=(-0.174533 0 0.436332) y=(-0.174533 0 0.436332)
          TransformAxis rotation2: coordinates=wrist_flex_l axis=(0.9564267 -0.2522069 0.147104)
            SimmSpline: x=(-1.5708 1.5708) y=(-0.785398 0.785398)
      WrapTorus ECRL_l: xyz_body_rotation=(-1.53833 -0.234398 0.731118) translation=(0.0222 -0.0096 -0.0208)
          quadrant=all inner_radius=0.008 outer_radius=0.016
      WrapTorus ECRB_l: xyz_body_rotation=(-1.31266 0.11781 -0.116239) translation=(0.0126 -0.0095 -0.0186)
          quadrant=all inner_radius=0.008 outer_radius=0.01
      WrapTorus FCR_l: xyz_body_rotation=(1.55596 0.15324 -0.100007) translation=(0.0032 -0.0045 0.019) quadrant=all
          inner_radius=0.001 outer_radius=0.0025
      WrapTorus FCU_l: xyz_body_rotation=(1.57376 0.0797616 0.39235) translation=(-0.0123 -0.0124 0.0171) quadrant=all
          inner_radius=0.0068 outer_radius=0.008
  ForceSet:
    Thelen2003Muscle [values shared by the 120 below unless stated]: min_control=0 max_control=1 optimal_force=1
        max_contraction_velocity=10 activation_time_constant=0.01 deactivation_time_constant=0.04
        FmaxTendonStrain=0.033 FmaxMuscleStrain=0.6 KshapeActive=0.5 KshapePassive=4 Af=0.3 Flen=1.8
    Thelen2003Muscle glut_med1_r: max_isometric_force=1119 optimal_fiber_length=0.0535 tendon_slack_length=0.078
        pennation_angle_at_optimal=0.1396263
      PathPoint P1: pelvis (-0.0408 0.0304 0.1209)
      PathPoint P2: femur_r (-0.0218 -0.0117 0.0555)
    Thelen2003Muscle glut_med2_r: max_isometric_force=873 optimal_fiber_length=0.0845 tendon_slack_length=0.053
        pennation_angle_at_optimal=0
      PathPoint P1: pelvis (-0.0855 0.0445 0.0766)
      PathPoint P2: femur_r (-0.0258 -0.0058 0.0527)
    Thelen2003Muscle glut_med3_r: max_isometric_force=1000 optimal_fiber_length=0.0646 tendon_slack_length=0.053
        pennation_angle_at_optimal=0.3316126
      PathPoint P1: pelvis (-0.1223 0.0105 0.0648)
      PathPoint P2: femur_r (-0.0309 -0.0047 0.0518)
    Thelen2003Muscle bifemlh_r: max_isometric_force=2700 optimal_fiber_length=0.109 tendon_slack_length=0.326
        pennation_angle_at_optimal=0
      PathPoint P1: pelvis (-0.12596 -0.10257 0.06944)
      PathPoint P2: tibia_r (-0.0301 -0.036 0.02943)
      PathPoint P3: tibia_r (-0.0234 -0.0563 0.0343)
    Thelen2003Muscle bifemsh_r: max_isometric_force=804 optimal_fiber_length=0.173 tendon_slack_length=0.089
        pennation_angle_at_optimal=0.4014257
      PathPoint P1: femur_r (0.005 -0.2111 0.0234)
      PathPoint P2: tibia_r (-0.0301 -0.036 0.02943)
      PathPoint P3: tibia_r (-0.0234 -0.0563 0.0343)
    Thelen2003Muscle sar_r: max_isometric_force=156 optimal_fiber_length=0.52 tendon_slack_length=0.1
        pennation_angle_at_optimal=0
      PathPoint P1: pelvis (-0.0153 -0.0013 0.1242)
      PathPoint P2: femur_r (-0.003 -0.3568 -0.0421)
      PathPoint P3: tibia_r (-0.0056 -0.0419 -0.0399)
      PathPoint P4: tibia_r (0.006 -0.0589 -0.0383)
      PathPoint P5: tibia_r (0.0243 -0.084 -0.0252)
    Thelen2003Muscle add_mag2_r: max_isometric_force=2343 optimal_fiber_length=0.121 tendon_slack_length=0.12
        pennation_angle_at_optimal=0.05235988
      PathPoint P1: pelvis (-0.0831 -0.1192 0.0308)
      PathPoint P2: femur_r (0.0054 -0.2285 0.0227)
    Thelen2003Muscle tfl_r: max_isometric_force=233 optimal_fiber_length=0.095 tendon_slack_length=0.425
        pennation_angle_at_optimal=0.05235988
      PathPoint P1: pelvis (-0.0311 0.0214 0.1241)
      PathPoint P2: femur_r (0.0294 -0.0995 0.0597)
      PathPoint P3: femur_r (0.0054 -0.4049 0.0357)
      PathPoint P4: tibia_r (0.006 -0.0487 0.0297)
    Thelen2003Muscle pect_r: max_isometric_force=266 optimal_fiber_length=0.1 tendon_slack_length=0.033
        pennation_angle_at_optimal=0
      PathPoint P1: pelvis (-0.0431 -0.0768 0.0451)
      PathPoint P2: femur_r (-0.0122 -0.0822 0.0253)
    Thelen2003Muscle grac_r: max_isometric_force=162 optimal_fiber_length=0.352 tendon_slack_length=0.126
        pennation_angle_at_optimal=0.05235988
      PathPoint P1: pelvis (-0.07401 -0.1187 0.02794)
      ConditionalPathPoint P2: tibia_r (-0.02657 -0.0319 -0.03774) range=(-0.436332 0.174533) coordinate=knee_angle_r
      PathPoint P3: tibia_r (-0.01943 -0.05153 -0.0358)
      PathPoint P4: tibia_r (0.006 -0.0836 -0.0228)
    Thelen2003Muscle glut_max1_r: max_isometric_force=573 optimal_fiber_length=0.142 tendon_slack_length=0.125
        pennation_angle_at_optimal=0.08726646
      PathPoint P1: pelvis (-0.1195 0.0612 0.07)
      PathPoint P2: pelvis (-0.1291 0.0012 0.0886)
      PathPoint P3: femur_r (-0.0457 -0.0248 0.0392)
      PathPoint P4: femur_r (-0.0277 -0.0566 0.047)
    Thelen2003Muscle glut_max2_r: max_isometric_force=819 optimal_fiber_length=0.147 tendon_slack_length=0.127
        pennation_angle_at_optimal=0
      PathPoint P1: pelvis (-0.1349 0.0176 0.0563)
      PathPoint P2: pelvis (-0.1376 -0.052 0.0914)
      PathPoint P3: femur_r (-0.0426 -0.053 0.0293)
      PathPoint P4: femur_r (-0.0156 -0.1016 0.0419)
    Thelen2003Muscle glut_max3_r: max_isometric_force=552 optimal_fiber_length=0.144 tendon_slack_length=0.145
        pennation_angle_at_optimal=0.08726646
      PathPoint P1: pelvis (-0.1556 -0.0314 0.0058)
      PathPoint P2: pelvis (-0.1529 -0.1052 0.0403)
      PathPoint P3: femur_r (-0.0299 -0.1041 0.0135)
      PathPoint P4: femur_r (-0.006 -0.1419 0.0411)
    Thelen2003Muscle iliacus_r: max_isometric_force=1073 optimal_fiber_length=0.1 tendon_slack_length=0.1
        pennation_angle_at_optimal=0.1221731
      PathPoint P1: pelvis (-0.0674 0.0365 0.0854)
      PathPoint P2: pelvis (-0.0258 -0.055 0.0811)
      ConditionalPathPoint P3: pelvis (-0.0288 -0.0805 0.0816) range=(-3 0.785398) coordinate=hip_flexion_r
      PathPoint P4: femur_r (0.0017 -0.0543 0.0057)
      PathPoint P5: femur_r (-0.0193 -0.0621 0.0129)
    Thelen2003Muscle psoas_r: max_isometric_force=1113 optimal_fiber_length=0.1 tendon_slack_length=0.16
        pennation_angle_at_optimal=0.1396263
      PathPoint P1: pelvis (-0.0647 0.0887 0.0289)
      PathPoint P2: pelvis (-0.0238 -0.057 0.0759)
      ConditionalPathPoint P3: pelvis (-0.0288 -0.0805 0.0816) range=(-3 0.785398) coordinate=hip_flexion_r
      PathPoint P4: femur_r (0.0016 -0.0507 0.0038)
      PathPoint P5: femur_r (-0.0188 -0.0597 0.0104)
    Thelen2003Muscle quad_fem_r: max_isometric_force=381 optimal_fiber_length=0.054 tendon_slack_length=0.024
        pennation_angle_at_optimal=0
      PathPoint P1: pelvis (-0.1143 -0.1151 0.052)
      PathPoint P2: femur_r (-0.0381 -0.0359 0.0366)
    Thelen2003Muscle gem_r: max_isometric_force=164 optimal_fiber_length=0.024 tendon_slack_length=0.039
        pennation_angle_at_optimal=0
      PathPoint P1: pelvis (-0.1133 -0.082 0.0714)
      PathPoint P2: femur_r (-0.0142 -0.0033 0.0443)
    Thelen2003Muscle peri_r: max_isometric_force=444 optimal_fiber_length=0.026 tendon_slack_length=0.115
        pennation_angle_at_optimal=0.1745329
      PathPoint P1: pelvis (-0.1396 0.0003 0.0235)
      PathPoint P2: pelvis (-0.1193 -0.0276 0.0657)
      PathPoint P3: femur_r (-0.0148 -0.0036 0.0437)
    Thelen2003Muscle rect_fem_r: max_isometric_force=1169 optimal_fiber_length=0.114 tendon_slack_length=0.31
        pennation_angle_at_optimal=0.08726646
      PathPoint P1: pelvis (-0.0295 -0.0311 0.0968)
      ConditionalPathPoint P2: femur_r (0.0334 -0.403 0.0019) range=(-3.1 -1.45997) coordinate=knee_angle_r
      MovingPathPoint P3: tibia_r (0.0617576 0.020984 0.0014) x_coordinate=knee_angle_r y_coordinate=knee_angle_r
          z_coordinate=knee_angle_r
        x_location: SimmSpline: x=(-2.0944 -1.99997 -1.5708 -1.45752 -1.39626 -1.0472 -0.698132 -0.526391 -0.349066 -0.174533 0 0.00017453 0.00034907 0.0279253 0.0872665 0.174533 2.0944)
            y=(0.0155805 0.0179938 0.0275081 0.0296564 0.0307615 0.0365695 0.0422074 0.0450902 0.048391 0.0534299 0.0617576 0.0617669 0.0617762 0.0633083 0.066994 0.0733035 0.0573481)
        y_location: SimmSpline: x=(-2.0944 -1.99997 -1.5708 -1.45752 -1.39626 -1.0472 -0.698132 -0.526391 -0.349066 -0.174533 0 0.00017453 0.00034907 0.0279253 0.0872665 0.174533 2.0944)
            y=(0.0234116 0.0237613 0.0251141 0.0252795 0.0253146 0.0249184 0.0242373 0.0238447 0.0234197 0.0227644 0.020984 0.0209814 0.0209788 0.0205225 0.0191754 0.0159554 -0.0673774)
        z_location: SimmSpline: x=(-2.0944 0.1745) y=(0.0014 0.0014)
    Thelen2003Muscle vas_int_r: max_isometric_force=5000 optimal_fiber_length=0.107 tendon_slack_length=0.116
        pennation_angle_at_optimal=0.05235988
      PathPoint P1: femur_r (0.029 -0.1924 0.031)
      PathPoint P2: femur_r (0.0335 -0.2084 0.0285)
      ConditionalPathPoint P3: femur_r (0.0343 -0.403 0.0055) range=(-3.1 -1.42) coordinate=knee_angle_r
      MovingPathPoint P4: tibia_r (0.0554632 0.0252923 0.0018) x_coordinate=knee_angle_r y_coordinate=knee_angle_r
          z_coordinate=knee_angle_r
        x_location: SimmSpline: x=(-2.0944 -1.99997 -1.5708 -1.45752 -1.39626 -1.0472 -0.698132 -0.526391 -0.349066 -0.174533 0 0.00017453 0.00034907 0.0279253 0.0872665 0.174533 2.0944)
            y=(0.0082733 0.0106866 0.0202042 0.022353 0.0234583 0.0292715 0.0349465 0.037871 0.0412569 0.0465287 0.0554632 0.0554735 0.0554837 0.0571717 0.061272 0.0684368 0.0648818)
        y_location: SimmSpline: x=(-2.0944 -1.99997 -1.5708 -1.45752 -1.39626 -1.0472 -0.698132 -0.526391 -0.349066 -0.174533 0 0.00017453 0.00034907 0.0279253 0.0872665 0.174533 2.0944)
            y=(0.025599 0.0259487 0.0273124 0.0274796 0.0275151 0.0271363 0.0265737 0.0263073 0.0261187 0.0260129 0.0252923 0.0252911 0.0252898 0.0250526 0.0242191 0.0218288 -0.0685706)
        z_location: SimmSpline: x=(-2.0944 2.0944) y=(0.0018 0.0018)
    Thelen2003Muscle med_gas_r: max_isometric_force=2500 optimal_fiber_length=0.09 tendon_slack_length=0.36
        pennation_angle_at_optimal=0.296706
      PathPoint P1: femur_r (-0.019 -0.3929 -0.0235)
      ConditionalPathPoint P2: femur_r (-0.03 -0.4022 -0.0258) range=(-0.785398 0.174533) coordinate=knee_angle_r
      PathPoint P3: talus_r (-0.04877 -0.01095 0.00262)
    Thelen2003Muscle soleus_r: max_isometric_force=4000 optimal_fiber_length=0.05 tendon_slack_length=0.25
        pennation_angle_at_optimal=0.4363323
      PathPoint P1: tibia_r (-0.0024 -0.1533 0.0071)
      PathPoint P2: talus_r (-0.04877 -0.01095 0.00262)
    Thelen2003Muscle tib_post_r: max_isometric_force=3600 optimal_fiber_length=0.031 tendon_slack_length=0.31
        pennation_angle_at_optimal=0.2094395
      PathPoint P1: tibia_r (-0.0094 -0.1348 0.0019)
      PathPoint P2: tibia_r (-0.0144 -0.4051 -0.0229)
      PathPoint P3: talus_r (-0.00707 -0.00855 -0.02068)
      PathPoint P4: talus_r (0.02843 -0.02605 -0.02018)
    Thelen2003Muscle tib_ant_r: max_isometric_force=3000 optimal_fiber_length=0.098 tendon_slack_length=0.223
        pennation_angle_at_optimal=0.08726646
      PathPoint P1: tibia_r (0.0179 -0.1624 0.0115)
      PathPoint P2: tibia_r (0.0329 -0.3951 -0.0177)
      PathPoint P3: talus_r (0.06783 -0.02415 -0.02258)
    Thelen2003Muscle per_long_r: max_isometric_force=943 optimal_fiber_length=0.049 tendon_slack_length=0.345
        pennation_angle_at_optimal=0.1745329
      PathPoint P1: tibia_r (0.0005 -0.1568 0.0362)
      PathPoint P2: tibia_r (-0.0207 -0.4205 0.0286)
      PathPoint P3: tibia_r (-0.0162 -0.4319 0.0289)
      PathPoint P4: talus_r (-0.00497 -0.01895 0.03002)
      PathPoint P5: talus_r (0.01933 -0.03135 0.03632)
      PathPoint P6: talus_r (0.03643 -0.03505 0.01972)
      PathPoint P7: talus_r (0.07153 -0.03345 -0.01048)
    Thelen2003Muscle flex_dig_r: max_isometric_force=310 optimal_fiber_length=0.034 tendon_slack_length=0.4
        pennation_angle_at_optimal=0.1221731 Vmax=10 Vmax0=5 damping=0.05
      PathPoint P1: tibia_r (-0.0083 -0.2046 -0.0018)
      PathPoint P2: tibia_r (-0.0154 -0.4051 -0.0196)
      PathPoint P3: talus_r (-0.00517 -0.01045 -0.02008)
      PathPoint P4: talus_r (0.02203 -0.02435 -0.01838)
      PathPoint P5: talus_r (0.11703 -0.05005 0.01952)
      PathPoint P6: toes_r (-0.0019 -0.0078 0.0147)
      PathPoint P7: toes_r (0.0285 -0.0071 0.0215)
      PathPoint P8: toes_r (0.0441 -0.006 0.0242)
    Thelen2003Muscle flex_hal_r: max_isometric_force=322 optimal_fiber_length=0.043 tendon_slack_length=0.38
        pennation_angle_at_optimal=0.1745329 Vmax=10 Vmax0=5 damping=0.05
      PathPoint P1: tibia_r (-0.0079 -0.2334 0.0244)
      PathPoint P2: tibia_r (-0.0186 -0.4079 -0.0174)
      PathPoint P3: talus_r (-0.01137 -0.01435 -0.01618)
      PathPoint P4: talus_r (0.05503 -0.03515 -0.01768)
      PathPoint P5: talus_r (0.12383 -0.04725 -0.01898)
      PathPoint P6: toes_r (0.0155 -0.0064 -0.0265)
      PathPoint P7: toes_r (0.0562 -0.0102 -0.0181)
    Thelen2003Muscle ext_dig_r: max_isometric_force=512 optimal_fiber_length=0.102 tendon_slack_length=0.345
        pennation_angle_at_optimal=0.1396263 Vmax=10 Vmax0=5 damping=0.05
      PathPoint P1: tibia_r (0.0032 -0.1381 0.0276)
      PathPoint P2: tibia_r (0.0289 -0.4007 0.0072)
      PathPoint P3: talus_r (0.04343 -0.00315 0.00782)
      PathPoint P4: talus_r (0.11283 -0.03645 0.02092)
      PathPoint P5: toes_r (0.0003 0.0047 0.0153)
      PathPoint P6: toes_r (0.0443 -0.0004 0.025)
    Thelen2003Muscle glut_med1_l: max_isometric_force=1119 optimal_fiber_length=0.0535 tendon_slack_length=0.078
        pennation_angle_at_optimal=0.1396263
      PathPoint P1: pelvis (-0.0408 0.0304 -0.1209)
      PathPoint P2: femur_l (-0.0218 -0.0117 -0.0555)
    Thelen2003Muscle glut_med2_l: max_isometric_force=873 optimal_fiber_length=0.0845 tendon_slack_length=0.053
        pennation_angle_at_optimal=0
      PathPoint P1: pelvis (-0.0855 0.0445 -0.0766)
      PathPoint P2: femur_l (-0.0258 -0.0058 -0.0527)
    Thelen2003Muscle glut_med3_l: max_isometric_force=1000 optimal_fiber_length=0.0646 tendon_slack_length=0.053
        pennation_angle_at_optimal=0.3316126
      PathPoint P1: pelvis (-0.1223 0.0105 -0.0648)
      PathPoint P2: femur_l (-0.0309 -0.0047 -0.0518)
    Thelen2003Muscle bifemlh_l: max_isometric_force=2700 optimal_fiber_length=0.109 tendon_slack_length=0.326
        pennation_angle_at_optimal=0
      PathPoint P1: pelvis (-0.12596 -0.10257 -0.06944)
      PathPoint P2: tibia_l (-0.0301 -0.036 -0.02943)
      PathPoint P3: tibia_l (-0.0234 -0.0563 -0.0343)
    Thelen2003Muscle bifemsh_l: max_isometric_force=804 optimal_fiber_length=0.173 tendon_slack_length=0.089
        pennation_angle_at_optimal=0.4014257
      PathPoint P1: femur_l (0.005 -0.2111 -0.0234)
      PathPoint P2: tibia_l (-0.0301 -0.036 -0.02943)
      PathPoint P3: tibia_l (-0.0234 -0.0563 -0.0343)
    Thelen2003Muscle sar_l: max_isometric_force=156 optimal_fiber_length=0.52 tendon_slack_length=0.1
        pennation_angle_at_optimal=0
      PathPoint P1: pelvis (-0.0153 -0.0013 -0.1242)
      PathPoint P2: femur_l (-0.003 -0.3568 0.0421)
      PathPoint P3: tibia_l (-0.0056 -0.0419 0.0399)
      PathPoint P4: tibia_l (0.006 -0.0589 0.0383)
      PathPoint P5: tibia_l (0.0243 -0.084 0.0252)
    Thelen2003Muscle add_mag2_l: max_isometric_force=2343 optimal_fiber_length=0.121 tendon_slack_length=0.12
        pennation_angle_at_optimal=0.05235988
      PathPoint P1: pelvis (-0.0831 -0.1192 -0.0308)
      PathPoint P2: femur_l (0.0054 -0.2285 -0.0227)
    Thelen2003Muscle tfl_l: max_isometric_force=233 optimal_fiber_length=0.095 tendon_slack_length=0.425
        pennation_angle_at_optimal=0.05235988
      PathPoint P1: pelvis (-0.0311 0.0214 -0.1241)
      PathPoint P2: femur_l (0.0294 -0.0995 -0.0597)
      PathPoint P3: femur_l (0.0054 -0.4049 -0.0357)
      PathPoint P4: tibia_l (0.006 -0.0487 -0.0297)
    Thelen2003Muscle pect_l: max_isometric_force=266 optimal_fiber_length=0.1 tendon_slack_length=0.033
        pennation_angle_at_optimal=0
      PathPoint P1: pelvis (-0.0431 -0.0768 -0.0451)
      PathPoint P2: femur_l (-0.0122 -0.0822 -0.0253)
    Thelen2003Muscle grac_l: max_isometric_force=162 optimal_fiber_length=0.352 tendon_slack_length=0.126
        pennation_angle_at_optimal=0.05235988
      PathPoint P1: pelvis (-0.07401 -0.1187 -0.02794)
      ConditionalPathPoint P2: tibia_l (-0.02657 -0.0319 0.03774) range=(-0.436332 0.174533) coordinate=knee_angle_l
      PathPoint P3: tibia_l (-0.01943 -0.05153 0.0358)
      PathPoint P4: tibia_l (0.006 -0.0836 0.0228)
    Thelen2003Muscle glut_max1_l: max_isometric_force=573 optimal_fiber_length=0.142 tendon_slack_length=0.125
        pennation_angle_at_optimal=0.08726646
      PathPoint P1: pelvis (-0.1195 0.0612 -0.07)
      PathPoint P2: pelvis (-0.1291 0.0012 -0.0886)
      PathPoint P3: femur_l (-0.0457 -0.0248 -0.0392)
      PathPoint P4: femur_l (-0.0277 -0.0566 -0.047)
    Thelen2003Muscle glut_max2_l: max_isometric_force=819 optimal_fiber_length=0.147 tendon_slack_length=0.127
        pennation_angle_at_optimal=0
      PathPoint P1: pelvis (-0.1349 0.0176 -0.0563)
      PathPoint P2: pelvis (-0.1376 -0.052 -0.0914)
      PathPoint P3: femur_l (-0.0426 -0.053 -0.0293)
      PathPoint P4: femur_l (-0.0156 -0.1016 -0.0419)
    Thelen2003Muscle glut_max3_l: max_isometric_force=552 optimal_fiber_length=0.144 tendon_slack_length=0.145
        pennation_angle_at_optimal=0.08726646
      PathPoint P1: pelvis (-0.1556 -0.0314 -0.0058)
      PathPoint P2: pelvis (-0.1529 -0.1052 -0.0403)
      PathPoint P3: femur_l (-0.0299 -0.1041 -0.0135)
      PathPoint P4: femur_l (-0.006 -0.1419 -0.0411)
    Thelen2003Muscle iliacus_l: max_isometric_force=1073 optimal_fiber_length=0.1 tendon_slack_length=0.1
        pennation_angle_at_optimal=0.1221731
      PathPoint P1: pelvis (-0.0674 0.0365 -0.0854)
      PathPoint P2: pelvis (-0.0258 -0.055 -0.0811)
      ConditionalPathPoint P3: pelvis (-0.0288 -0.0805 -0.0816) range=(-3 0.785398) coordinate=hip_flexion_l
      PathPoint P4: femur_l (0.0017 -0.0543 -0.0057)
      PathPoint P5: femur_l (-0.0193 -0.0621 -0.0129)
    Thelen2003Muscle psoas_l: max_isometric_force=1113 optimal_fiber_length=0.1 tendon_slack_length=0.16
        pennation_angle_at_optimal=0.1396263
      PathPoint P1: pelvis (-0.0647 0.0887 -0.0289)
      PathPoint P2: pelvis (-0.0238 -0.057 -0.0759)
      ConditionalPathPoint P3: pelvis (-0.0288 -0.0805 -0.0816) range=(-3 0.785398) coordinate=hip_flexion_l
      PathPoint P4: femur_l (0.0016 -0.0507 -0.0038)
      PathPoint P5: femur_l (-0.0188 -0.0597 -0.0104)
    Thelen2003Muscle quad_fem_l: max_isometric_force=381 optimal_fiber_length=0.054 tendon_slack_length=0.024
        pennation_angle_at_optimal=0
      PathPoint P1: pelvis (-0.1143 -0.1151 -0.052)
      PathPoint P2: femur_l (-0.0381 -0.0359 -0.0366)
    Thelen2003Muscle gem_l: max_isometric_force=164 optimal_fiber_length=0.024 tendon_slack_length=0.039
        pennation_angle_at_optimal=0
      PathPoint P1: pelvis (-0.1133 -0.082 -0.0714)
      PathPoint P2: femur_l (-0.0142 -0.0033 -0.0443)
    Thelen2003Muscle peri_l: max_isometric_force=444 optimal_fiber_length=0.026 tendon_slack_length=0.115
        pennation_angle_at_optimal=0.1745329
      PathPoint P1: pelvis (-0.1396 0.0003 -0.0235)
      PathPoint P2: pelvis (-0.1193 -0.0276 -0.0657)
      PathPoint P3: femur_l (-0.0148 -0.0036 -0.0437)
    Thelen2003Muscle rect_fem_l: max_isometric_force=1169 optimal_fiber_length=0.114 tendon_slack_length=0.31
        pennation_angle_at_optimal=0.08726646
      PathPoint P1: pelvis (-0.0295 -0.0311 -0.0968)
      ConditionalPathPoint P2: femur_l (0.0334 -0.403 -0.0019) range=(-3.1 -1.45997) coordinate=knee_angle_l
      MovingPathPoint P3: tibia_l (0.0617576 0.020984 -0.0014) x_coordinate=knee_angle_l y_coordinate=knee_angle_l
          z_coordinate=knee_angle_l
        x_location: SimmSpline: x=(-2.0944 -1.99997 -1.5708 -1.45752 -1.39626 -1.0472 -0.698132 -0.526391 -0.349066 -0.174533 0 0.00017453 0.00034907 0.0279253 0.0872665 0.174533 2.0944)
            y=(0.0155805 0.0179938 0.0275081 0.0296564 0.0307615 0.0365695 0.0422074 0.0450902 0.048391 0.0534299 0.0617576 0.0617669 0.0617762 0.0633083 0.066994 0.0733035 0.0573481)
        y_location: SimmSpline: x=(-2.0944 -1.99997 -1.5708 -1.45752 -1.39626 -1.0472 -0.698132 -0.526391 -0.349066 -0.174533 0 0.00017453 0.00034907 0.0279253 0.0872665 0.174533 2.0944)
            y=(0.0234116 0.0237613 0.0251141 0.0252795 0.0253146 0.0249184 0.0242373 0.0238447 0.0234197 0.0227644 0.020984 0.0209814 0.0209788 0.0205225 0.0191754 0.0159554 -0.0673774)
        z_location: SimmSpline: x=(-2.0944 0.1745) y=(-0.0014 -0.0014)
    Thelen2003Muscle vas_int_l: max_isometric_force=5000 optimal_fiber_length=0.107 tendon_slack_length=0.116
        pennation_angle_at_optimal=0.05235988
      PathPoint P1: femur_l (0.029 -0.1924 -0.031)
      PathPoint P2: femur_l (0.0335 -0.2084 -0.0285)
      ConditionalPathPoint P3: femur_l (0.0343 -0.403 -0.0055) range=(-3.1 -1.42) coordinate=knee_angle_l
      MovingPathPoint P4: tibia_l (0.0554632 0.0252923 -0.0018) x_coordinate=knee_angle_l y_coordinate=knee_angle_l
          z_coordinate=knee_angle_l
        x_location: SimmSpline: x=(-2.0944 -1.99997 -1.5708 -1.45752 -1.39626 -1.0472 -0.698132 -0.526391 -0.349066 -0.174533 0 0.00017453 0.00034907 0.0279253 0.0872665 0.174533 2.0944)
            y=(0.0082733 0.0106866 0.0202042 0.022353 0.0234583 0.0292715 0.0349465 0.037871 0.0412569 0.0465287 0.0554632 0.0554735 0.0554837 0.0571717 0.061272 0.0684368 0.0648818)
        y_location: SimmSpline: x=(-2.0944 -1.99997 -1.5708 -1.45752 -1.39626 -1.0472 -0.698132 -0.526391 -0.349066 -0.174533 0 0.00017453 0.00034907 0.0279253 0.0872665 0.174533 2.0944)
            y=(0.025599 0.0259487 0.0273124 0.0274796 0.0275151 0.0271363 0.0265737 0.0263073 0.0261187 0.0260129 0.0252923 0.0252911 0.0252898 0.0250526 0.0242191 0.0218288 -0.0685706)
        z_location: SimmSpline: x=(-2.0944 2.0944) y=(-0.0018 -0.0018)
    Thelen2003Muscle med_gas_l: max_isometric_force=2500 optimal_fiber_length=0.09 tendon_slack_length=0.36
        pennation_angle_at_optimal=0.296706
      PathPoint P1: femur_l (-0.019 -0.3929 0.0235)
      ConditionalPathPoint P2: femur_l (-0.03 -0.4022 0.0258) range=(-0.785398 0.174533) coordinate=knee_angle_l
      PathPoint P3: talus_l (-0.04877 -0.01095 -0.00262)
    Thelen2003Muscle soleus_l: max_isometric_force=4000 optimal_fiber_length=0.05 tendon_slack_length=0.25
        pennation_angle_at_optimal=0.4363323
      PathPoint P1: tibia_l (-0.0024 -0.1533 -0.0071)
      PathPoint P2: talus_l (-0.04877 -0.01095 -0.00262)
    Thelen2003Muscle tib_post_l: max_isometric_force=3600 optimal_fiber_length=0.031 tendon_slack_length=0.31
        pennation_angle_at_optimal=0.2094395
      PathPoint P1: tibia_l (-0.0094 -0.1348 -0.0019)
      PathPoint P2: tibia_l (-0.0144 -0.4051 0.0229)
      PathPoint P3: talus_l (-0.00707 -0.00855 0.02068)
      PathPoint P4: talus_l (0.02843 -0.02605 0.02018)
    Thelen2003Muscle tib_ant_l: max_isometric_force=3000 optimal_fiber_length=0.098 tendon_slack_length=0.223
        pennation_angle_at_optimal=0.08726646
      PathPoint P1: tibia_l (0.0179 -0.1624 -0.0115)
      PathPoint P2: tibia_l (0.0329 -0.3951 0.0177)
      PathPoint P3: talus_l (0.06783 -0.02415 0.02258)
    Thelen2003Muscle per_long_l: max_isometric_force=943 optimal_fiber_length=0.049 tendon_slack_length=0.345
        pennation_angle_at_optimal=0.1745329
      PathPoint P1: tibia_l (0.0005 -0.1568 -0.0362)
      PathPoint P2: tibia_l (-0.0207 -0.4205 -0.0286)
      PathPoint P3: tibia_l (-0.0162 -0.4319 -0.0289)
      PathPoint P4: talus_l (-0.00497 -0.01895 -0.03002)
      PathPoint P5: talus_l (0.01933 -0.03135 -0.03632)
      PathPoint P6: talus_l (0.03643 -0.03505 -0.01972)
      PathPoint P7: talus_l (0.07153 -0.03345 0.01048)
    Thelen2003Muscle flex_dig_l: max_isometric_force=310 optimal_fiber_length=0.034 tendon_slack_length=0.4
        pennation_angle_at_optimal=0.1221731 Vmax=10 Vmax0=5 damping=0.05
      PathPoint P1: tibia_l (-0.0083 -0.2046 0.0018)
      PathPoint P2: tibia_l (-0.0154 -0.4051 0.0196)
      PathPoint P3: talus_l (-0.00517 -0.01045 0.02008)
      PathPoint P4: talus_l (0.02203 -0.02435 0.01838)
      PathPoint P5: talus_l (0.11703 -0.05005 -0.01952)
      PathPoint P6: toes_l (-0.0019 -0.0078 -0.0147)
      PathPoint P7: toes_l (0.0285 -0.0071 -0.0215)
      PathPoint P8: toes_l (0.0441 -0.006 -0.0242)
    Thelen2003Muscle flex_hal_l: max_isometric_force=322 optimal_fiber_length=0.043 tendon_slack_length=0.38
        pennation_angle_at_optimal=0.1745329 Vmax=10 Vmax0=5 damping=0.05
      PathPoint P1: tibia_l (-0.0079 -0.2334 -0.0244)
      PathPoint P2: tibia_l (-0.0186 -0.4079 0.0174)
      PathPoint P3: talus_l (-0.01137 -0.01435 0.01618)
      PathPoint P4: talus_l (0.05503 -0.03515 0.01768)
      PathPoint P5: talus_l (0.12383 -0.04725 0.01898)
      PathPoint P6: toes_l (0.0155 -0.0064 0.0265)
      PathPoint P7: toes_l (0.0562 -0.0102 0.0181)
    Thelen2003Muscle ext_dig_l: max_isometric_force=512 optimal_fiber_length=0.102 tendon_slack_length=0.345
        pennation_angle_at_optimal=0.1396263 Vmax=10 Vmax0=5 damping=0.05
      PathPoint P1: tibia_l (0.0032 -0.1381 -0.0276)
      PathPoint P2: tibia_l (0.0289 -0.4007 -0.0072)
      PathPoint P3: talus_l (0.04343 -0.00315 -0.00782)
      PathPoint P4: talus_l (0.11283 -0.03645 -0.02092)
      PathPoint P5: toes_l (0.0003 0.0047 -0.0153)
      PathPoint P6: toes_l (0.0443 -0.0004 -0.025)
    Thelen2003Muscle ercspn_r: max_isometric_force=2500 optimal_fiber_length=0.12 tendon_slack_length=0.03
        pennation_angle_at_optimal=0
      PathPoint P1: pelvis (-0.14 0.0439 0.0436)
      PathPoint P2: thorax (-0.0757 -0.2685 0.0241)
    Thelen2003Muscle ercspn_l: max_isometric_force=2500 optimal_fiber_length=0.12 tendon_slack_length=0.03
        pennation_angle_at_optimal=0
      PathPoint P1: pelvis (-0.14 0.0439 -0.0436)
      PathPoint P2: thorax (-0.0757 -0.2685 -0.0241)
    Thelen2003Muscle intobl_r: max_isometric_force=900 optimal_fiber_length=0.1 tendon_slack_length=0.1
        pennation_angle_at_optimal=0
      PathPoint P1: pelvis (-0.04 0.07 0.1157)
      PathPoint P2: thorax (0.0493 -0.2185 0.015)
    Thelen2003Muscle intobl_l: max_isometric_force=900 optimal_fiber_length=0.1 tendon_slack_length=0.1
        pennation_angle_at_optimal=0
      PathPoint P1: pelvis (-0.04 0.07 -0.1157)
      PathPoint P2: thorax (0.0493 -0.2185 -0.015)
    Thelen2003Muscle extobl_r: max_isometric_force=900 optimal_fiber_length=0.12 tendon_slack_length=0.14
        pennation_angle_at_optimal=0
      PathPoint P1: pelvis (-0.03 -0.0636 0.01)
      PathPoint P2: thorax (0.0443 -0.2685 0.11)
    Thelen2003Muscle extobl_l: max_isometric_force=900 optimal_fiber_length=0.12 tendon_slack_length=0.14
        pennation_angle_at_optimal=0
      PathPoint P1: pelvis (-0.03 -0.0636 -0.01)
      PathPoint P2: thorax (0.0443 -0.2685 -0.11)
    Thelen2003Muscle DELT1: max_isometric_force=1142.6 optimal_fiber_length=0.0976 tendon_slack_length=0.093
        pennation_angle_at_optimal=0.3839724 default_activation=0.05 default_fiber_length=0.1
      PathPoint P1: humerus (0.00896 -0.11883 0.00585)
      PathPoint P2: humerus (0.01623 -0.11033 0.00412)
      PathPoint P3: thorax (0.035465 -0.00552 0.16199)
      PathPoint P4: thorax (-0.007675 0.01799 0.105675)
      PathWrap: wrap_object=delt2hum method=hybrid
      PathWrap: wrap_object=DELT1hh method=hybrid range=(2 3)
    Thelen2003Muscle DELT2: max_isometric_force=1142.6 optimal_fiber_length=0.1078 tendon_slack_length=0.1095
        pennation_angle_at_optimal=0.2617994 default_activation=0.05 default_fiber_length=0.1
      PathPoint P1: humerus (0.00461 -0.13611 0.0056)
      PathPoint P2: humerus (-0.00208 -0.05381 0.01859)
      PathPoint P3: thorax (-0.007955 0.02994 0.18333)
      PathPoint P4: thorax (-0.018785 0.02666 0.1672)
      PathWrap: wrap_object=Deltoid2 method=hybrid
      PathWrap: wrap_object=delt2hum method=hybrid
      PathWrap: wrap_object=TMAJ_LAT_PEC_CORBhh method=hybrid
    Thelen2003Muscle DELT3: max_isometric_force=259.88 optimal_fiber_length=0.1367 tendon_slack_length=0.038
        pennation_angle_at_optimal=0.3141593 default_activation=0.05 default_fiber_length=0.1
      PathPoint P1: thorax (-0.063735 0.02822 0.13588)
      PathPoint P2: thorax (-0.080475 -0.00585 0.17333)
      PathPoint P3: humerus (0.00206 -0.07602 0.01045)
      PathWrap: wrap_object=Delt3 method=hybrid
      PathWrap: wrap_object=delt3hum method=hybrid
      PathWrap: wrap_object=TMAJ_LAT_PEC_CORBhh method=hybrid
    Thelen2003Muscle SUPSP: max_isometric_force=487.82 optimal_fiber_length=0.0682 tendon_slack_length=0.0395
        pennation_angle_at_optimal=0.1221731 default_activation=0.05 default_fiber_length=0.1
      PathPoint P1: humerus (0.00256 0.01063 0.02593)
      PathPoint P2: thorax (-0.027185 0.02827 0.14829)
      PathPoint P3: thorax (-0.052005 0.01188 0.10245)
      PathWrap: wrap_object=SUPSP method=hybrid
    Thelen2003Muscle INFSP: max_isometric_force=1210.84 optimal_fiber_length=0.0755 tendon_slack_length=0.0308
        pennation_angle_at_optimal=0.3228859 default_activation=0.05 default_fiber_length=0.1
      PathPoint P1: humerus (-0.00887 0.00484 0.02448)
      PathPoint P2: thorax (-0.081825 -0.02776 0.11319)
      PathWrap: wrap_object=INFSP method=hybrid
      PathWrap: wrap_object=INFSP_and_TMIN_hum_head method=hybrid
    Thelen2003Muscle SUBSC: max_isometric_force=1377.81 optimal_fiber_length=0.0873 tendon_slack_length=0.033
        pennation_angle_at_optimal=0.3490659 default_activation=0.05 default_fiber_length=0.1
      PathPoint P1: humerus (0.01403 0.0084 -0.01331)
      PathPoint P2: thorax (-0.026315 -0.02523 0.13643)
      PathPoint P3: thorax (-0.080465 -0.01243 0.09625)
      PathWrap: wrap_object=SUBSCAP method=hybrid
    Thelen2003Muscle TMIN: max_isometric_force=354.25 optimal_fiber_length=0.0741 tendon_slack_length=0.0713
        pennation_angle_at_optimal=0.418879 default_activation=0.05 default_fiber_length=0.1
      PathPoint P1: humerus (-0.0011 -0.01264 0.02156)
      PathPoint P2: thorax (-0.102735 -0.05291 0.11363)
      PathPoint P3: thorax (-0.104435 -0.05421 0.10802)
      PathWrap: wrap_object=TMIN method=hybrid range=(1 2)
      PathWrap: wrap_object=INFSP_and_TMIN_hum_head method=hybrid range=(1 2)
      PathWrap: wrap_object=TMINhum method=hybrid range=(1 2)
    Thelen2003Muscle TMAJ: max_isometric_force=425.39 optimal_fiber_length=0.1624 tendon_slack_length=0.02
        pennation_angle_at_optimal=0.2792527 default_activation=0.05 default_fiber_length=0.1
      PathPoint P1: humerus (0.00998 -0.05419 -0.00568)
      PathPoint P2: thorax (-0.110645 -0.07619 0.10271)
      PathPoint P3: thorax (-0.112895 -0.08195 0.08983)
      PathWrap: wrap_object=TMAJ_LAThum method=hybrid
      PathWrap: wrap_object=LAT_TMAJhh method=hybrid range=(1 2)
      PathWrap: wrap_object=LAT_TMAJ2hh method=hybrid
    Thelen2003Muscle PECM1: max_isometric_force=364.41 optimal_fiber_length=0.1442 tendon_slack_length=0.0028
        pennation_angle_at_optimal=0.296706 default_activation=0.05 default_fiber_length=0.1
      PathPoint P1: humerus (0.01169 -0.04191 0.0078)
      PathPoint P2: humerus (0.01615 -0.04045 -0.00577)
      PathPoint P3: thorax (0.00958 -0.01509 0.12664)
      PathPoint P4: thorax (0.009535 0.0068 0.076595)
      PathWrap: wrap_object=Thorax method=hybrid
      PathWrap: wrap_object=PEC12hum method=hybrid range=(2 3)
      PathWrap: wrap_object=PEC1hh method=hybrid
    Thelen2003Muscle PECM2: max_isometric_force=515.41 optimal_fiber_length=0.1385 tendon_slack_length=0.089
        pennation_angle_at_optimal=0.4363323 default_activation=0.05 default_fiber_length=0.1
      PathPoint P1: humerus (0.01274 -0.04289 0.00785)
      PathPoint P2: humerus (0.01453 -0.04568 -0.00687)
      PathPoint P3: thorax (0.02018 -0.04165 0.1269)
      PathPoint P4: thorax (0.03091 -0.03922 0.09705)
      PathPoint P5: thorax (0.02769 -0.04498 0.02271)
      PathWrap: wrap_object=Thorax method=hybrid
      PathWrap: wrap_object=PEC12hum method=hybrid range=(2 3)
      PathWrap: wrap_object=TMAJ_LAT_PEC_CORBhh method=hybrid
      PathWrap: wrap_object=PEC23hh method=hybrid
    Thelen2003Muscle PECM3: max_isometric_force=390.55 optimal_fiber_length=0.1385 tendon_slack_length=0.132
        pennation_angle_at_optimal=0.4363323 default_activation=0.05 default_fiber_length=0.1
      PathPoint P1: humerus (0.01269 -0.04375 0.0075)
      PathPoint P2: humerus (0.01243 -0.05157 -0.01807)
      PathPoint P3: thorax (0.02984 -0.0707747 0.1151)
      PathPoint P4: thorax (0.0525 -0.08417 0.08935)
      PathPoint P5: thorax (0.05724 -0.11654 0.03787)
      PathWrap: wrap_object=Thorax method=hybrid
      PathWrap: wrap_object=PEC3hum method=hybrid range=(2 3)
      PathWrap: wrap_object=PEC23hh method=hybrid
    Thelen2003Muscle LAT1: max_isometric_force=389.1 optimal_fiber_length=0.254 tendon_slack_length=0.12
        pennation_angle_at_optimal=0.4363323 default_activation=0.05 default_fiber_length=0.1
      PathPoint P1: humerus (0.0105 -0.03415 -0.00653)
      PathPoint P2: thorax (-0.087475 -0.05881 0.13912)
      PathPoint P3: thorax (-0.120155 -0.07079 0.10778)
      PathPoint P4: thorax (-0.11828 -0.10118 0.03316)
      PathPoint P5: thorax (-0.09578 -0.11724 0.00882)
      PathWrap: wrap_object=TMAJ_LAThum method=hybrid
      PathWrap: wrap_object=LAT_TMAJhh method=hybrid range=(1 2)
      PathWrap: wrap_object=LAT_TMAJ2hh method=hybrid
    Thelen2003Muscle LAT2: max_isometric_force=389.1 optimal_fiber_length=0.2324 tendon_slack_length=0.1765
        pennation_angle_at_optimal=0.3316126 default_activation=0.05 default_fiber_length=0.1
      PathPoint P1: humerus (0.00968 -0.04071 -0.00611)
      PathPoint P2: thorax (-0.086075 -0.07567 0.13798)
      PathPoint P3: thorax (-0.115965 -0.10593 0.0868)
      PathPoint P4: thorax (-0.10992 -0.16908 0.02878)
      PathPoint P5: thorax (-0.07186 -0.18818 0.00815)
      PathWrap: wrap_object=TMAJ_LAThum method=hybrid
      PathWrap: wrap_object=LAT_TMAJhh method=hybrid range=(1 2)
      PathWrap: wrap_object=LAT_TMAJ2hh method=hybrid
    Thelen2003Muscle LAT3: max_isometric_force=281.66 optimal_fiber_length=0.2789 tendon_slack_length=0.1403
        pennation_angle_at_optimal=0.3665191 default_activation=0.05 default_fiber_length=0.1
      PathPoint P1: humerus (0.01208 -0.03922 -0.00416)
      PathPoint P2: thorax (-0.0995924 -0.110033 0.11799)
      PathPoint P3: thorax (-0.116086 -0.141394 0.0939073)
      PathPoint P4: thorax (-0.11157 -0.19387 0.05532)
      PathPoint P5: thorax (-0.07117 -0.24858 0.00907)
      PathWrap: wrap_object=TMAJ_LAThum method=hybrid
      PathWrap: wrap_object=LAT_TMAJhh method=hybrid range=(1 2)
      PathWrap: wrap_object=LAT_TMAJ2hh method=hybrid
    Thelen2003Muscle CORB: max_isometric_force=242.46 optimal_fiber_length=0.0932 tendon_slack_length=0.097
        pennation_angle_at_optimal=0 default_activation=0.05 default_fiber_length=0.1
      PathPoint P1: thorax (0.004495 -0.01427 0.13448)
      PathPoint P2: thorax (-0.003175 -0.04258 0.14537)
      PathPoint P3: humerus (0.00743 -0.15048 -0.00782)
      PathWrap: wrap_object=CORBhum method=hybrid
      PathWrap: wrap_object=TMAJ_LAT_PEC_CORBhh method=hybrid
    Thelen2003Muscle TRIlong: max_isometric_force=798.52 optimal_fiber_length=0.134 tendon_slack_length=0.143
        pennation_angle_at_optimal=0.2094395 default_activation=0.05 default_fiber_length=0.1
      PathPoint P1: thorax (-0.053655 -0.01373 0.14723)
      PathPoint P2: humerus (-0.02714 -0.11441 -0.00664)
      PathPoint P3: humerus (-0.03184 -0.22637 -0.01217)
      PathPoint P4: humerus (-0.01743 -0.26757 -0.01208)
      PathPoint P5: ulna (-0.0219 0.01046 -0.00078)
      PathWrap: wrap_object=TRI method=hybrid
      PathWrap: wrap_object=TRIlonghh method=hybrid
      PathWrap: wrap_object=TRIlongglen method=hybrid
    Thelen2003Muscle TRIlat: max_isometric_force=624.3 optimal_fiber_length=0.1138 tendon_slack_length=0.098
        pennation_angle_at_optimal=0.1570796 default_activation=0.05 default_fiber_length=0.1
      PathPoint P1: humerus (-0.00599 -0.12646 0.00428)
      PathPoint P2: humerus (-0.02344 -0.14528 0.00928)
      PathPoint P3: humerus (-0.03184 -0.22637 -0.01217)
      PathPoint P4: humerus (-0.01743 -0.26757 -0.01208)
      PathPoint P5: ulna (-0.0219 0.01046 -0.00078)
      PathWrap: wrap_object=TRI method=hybrid
    Thelen2003Muscle TRImed: max_isometric_force=624.3 optimal_fiber_length=0.1138 tendon_slack_length=0.0908
        pennation_angle_at_optimal=0.1570796 default_activation=0.05 default_fiber_length=0.1
      PathPoint P1: humerus (-0.00838 -0.13695 -0.00906)
      PathPoint P2: humerus (-0.02601 -0.15139 -0.0108)
      PathPoint P3: humerus (-0.03184 -0.22637 -0.01217)
      PathPoint P4: humerus (-0.01743 -0.26757 -0.01208)
      PathPoint P5: ulna (-0.0219 0.01046 -0.00078)
      PathWrap: wrap_object=TRI method=hybrid
    Thelen2003Muscle ANC: max_isometric_force=350 optimal_fiber_length=0.027 tendon_slack_length=0.018
        pennation_angle_at_optimal=0 default_activation=0.05 default_fiber_length=0.1
      PathPoint P1: humerus (-0.00744 -0.28359 0.00979)
      PathPoint P2: ulna (-0.02532 -0.00124 0.006)
      PathWrap: wrap_object=ANC method=hybrid
    Thelen2003Muscle BIClong: max_isometric_force=624.3 optimal_fiber_length=0.1157 tendon_slack_length=0.2723
        pennation_angle_at_optimal=0 default_activation=0.05 default_fiber_length=0.1
      PathPoint P1: thorax (-0.039235 0.00347 0.14795)
      PathPoint P2: thorax (-0.028945 0.01391 0.15639)
      PathPoint P3: humerus (0.02131 0.01793 0.01028)
      PathPoint P4: humerus (0.02378 -0.00511 0.01201)
      PathPoint P5: humerus (0.01345 -0.02827 0.00136)
      PathPoint P6: humerus (0.01068 -0.07736 -0.00165)
      PathPoint P7: humerus (0.01703 -0.12125 0.00024)
      PathPoint P8: humerus (0.0228 -0.1754 -0.0063)
      PathPoint P9: radius (0.01467 -0.0102 -0.01062)
      ConditionalPathPoint P10: radius (-0.0001 -0.0276 -0.0043) range=(-0.638791 1.5708) coordinate=pro_sup
      PathPoint P11: radius (-0.002 -0.0375 -0.002)
      PathWrap: wrap_object=Elbow_BIC_BRD method=hybrid
      PathWrap: wrap_object=BIClong method=hybrid range=(2 3)
    Thelen2003Muscle BICshort: max_isometric_force=435.56 optimal_fiber_length=0.1321 tendon_slack_length=0.1923
        pennation_angle_at_optimal=0 default_activation=0.05 default_fiber_length=0.1
      PathPoint P1: thorax (0.004675 -0.01231 0.13475)
      PathPoint P2: thorax (-0.007075 -0.04004 0.14507)
      PathPoint P3: humerus (0.01117 -0.07576 -0.01101)
      PathPoint P4: humerus (0.01703 -0.12125 -0.01079)
      PathPoint P5: humerus (0.0228 -0.1754 -0.0063)
      PathPoint P6: radius (0.0119375 -0.0102 -0.0114103)
      ConditionalPathPoint P7: radius (-0.0001 -0.0276 -0.0043) range=(-0.638791 1.5708) coordinate=pro_sup
      PathPoint P8: radius (-0.002 -0.0375 -0.002)
      PathWrap: wrap_object=Elbow_BIC_BRD method=hybrid
    Thelen2003Muscle BRA: max_isometric_force=987.26 optimal_fiber_length=0.0858 tendon_slack_length=0.0535
        pennation_angle_at_optimal=0 default_activation=0.05 default_fiber_length=0.1
      PathPoint P1: humerus (0.0068 -0.1739 -0.0036)
      ConditionalPathPoint P2: humerus (0.01894 -0.28559 -0.01105) range=(0 0.813149) coordinate=elbow_flexion
      ConditionalPathPoint P3: ulna (0.00498 -0.01463 0.00128) range=(0 0.813149) coordinate=elbow_flexion
      PathPoint P4: ulna (-0.0032 -0.0239 0.0009)
    Thelen2003Muscle BRD: max_isometric_force=261.33 optimal_fiber_length=0.1726 tendon_slack_length=0.133
        pennation_angle_at_optimal=0 default_activation=0.05 default_fiber_length=0.1
      PathPoint P1: humerus (-0.0098 -0.19963 0.00223)
      PathPoint P2: radius (0.03577 -0.12742 0.02315)
      PathPoint P3: radius (0.0419 -0.221 0.0224)
      PathWrap: wrap_object=Elbow_BIC_BRD method=hybrid
    Thelen2003Muscle ECRL: max_isometric_force=304.89 optimal_fiber_length=0.081 tendon_slack_length=0.224
        pennation_angle_at_optimal=0 default_activation=0.05 default_fiber_length=0.1
      PathPoint P1: humerus (-0.0073 -0.2609 0.0091)
      PathPoint P2: radius (0.03195 -0.13463 0.02779)
      PathPoint P3: radius (0.04243 -0.23684 0.0362)
      PathPoint P4: hand_r (0.021167 -0.036274 0.008159)
      PathWrap: wrap_object=Elbow_PT_ECRL method=hybrid
      PathWrap: wrap_object=ECRL method=hybrid
    Thelen2003Muscle ECRB: max_isometric_force=100.52 optimal_fiber_length=0.0585 tendon_slack_length=0.2223
        pennation_angle_at_optimal=0.1553343 default_activation=0.05 default_fiber_length=0.1
      PathPoint P1: humerus (0.01349 -0.29048 0.01698)
      PathPoint P2: radius (0.02905 -0.13086 0.02385)
      PathPoint P3: radius (0.03549 -0.22805 0.03937)
      PathPoint P4: hand_r (0.008989 -0.026413 0.010824)
      PathWrap: wrap_object=ECRB method=hybrid
    Thelen2003Muscle ECU: max_isometric_force=93.17 optimal_fiber_length=0.0622 tendon_slack_length=0.2285
        pennation_angle_at_optimal=0.06108652 default_activation=0.05 default_fiber_length=0.1
      PathPoint P1: humerus (0.00083 -0.28955 0.0188)
      PathPoint P2: ulna (-0.01391 -0.03201 0.02947)
      PathPoint P3: ulna (-0.01705 -0.05428 0.02868)
      PathPoint P4: ulna (-0.01793 -0.09573 0.03278)
      PathPoint P5: radius (-0.01421 -0.22696 0.03481)
      PathPoint P6: hand_r (-0.018514 -0.029067 0.001049)
      PathWrap: wrap_object=ECU method=hybrid
    Thelen2003Muscle FCR: max_isometric_force=73.96 optimal_fiber_length=0.0628 tendon_slack_length=0.244
        pennation_angle_at_optimal=0.05410521 default_activation=0.05 default_fiber_length=0.1
      PathPoint P1: humerus (0.00758 -0.27806 -0.03705)
      PathPoint P2: radius (0.0211 -0.21943 0.00127)
      PathPoint P3: hand_r (0.015227 -0.033494 -0.001851)
      PathWrap: wrap_object=Elbow_PT_ECRL method=hybrid
      PathWrap: wrap_object=FCR method=hybrid
    Thelen2003Muscle FCU: max_isometric_force=128.93 optimal_fiber_length=0.0509 tendon_slack_length=0.265
        pennation_angle_at_optimal=0.2111848 default_activation=0.05 default_fiber_length=0.1
      PathPoint P1: humerus (0.00219 -0.2774 -0.0388)
      PathPoint P2: radius (0.0105197 -0.183974 0.00012377)
      PathPoint P3: radius (0.01082 -0.22327 0.00969)
      PathPoint P4: hand_r (-0.016364 -0.032707 -0.005191)
      PathWrap: wrap_object=FCU method=hybrid
      PathWrap: wrap_object=Elbow_PT_ECRL method=hybrid
    Thelen2003Muscle PT: max_isometric_force=566.22 optimal_fiber_length=0.0492 tendon_slack_length=0.098
        pennation_angle_at_optimal=0.1745329 default_activation=0.05 default_fiber_length=0.1
      PathPoint P1: humerus (0.0036 -0.2759 -0.0365)
      PathPoint P2: ulna (0.00846 -0.03373 -0.01432)
      PathPoint P3: radius (0.01179 -0.053657 -0.022189)
      ConditionalPathPoint P4: radius (0.0236 -0.0934 0.0094) range=(-1.5708 0.509636) coordinate=pro_sup
      PathPoint P5: radius (0.0254 -0.1088 0.0198)
      PathWrap: wrap_object=Elbow_PT_ECRL method=hybrid
    Thelen2003Muscle DELT1_l: max_isometric_force=1142.6 optimal_fiber_length=0.0976 tendon_slack_length=0.093
        pennation_angle_at_optimal=0.3839724 default_activation=0.05 default_fiber_length=0.1
      PathPoint P1: humerus_l (0.00896 -0.11883 -0.00585)
      PathPoint P2: humerus_l (0.01623 -0.11033 -0.00412)
      PathPoint P3: thorax (0.035465 -0.00552 -0.16199)
      PathPoint P4: thorax (-0.007675 0.01799 -0.105675)
      PathWrap: wrap_object=delt2hum_l method=hybrid
      PathWrap: wrap_object=DELT1hh_l method=hybrid range=(2 3)
    Thelen2003Muscle DELT2_l: max_isometric_force=1142.6 optimal_fiber_length=0.1078 tendon_slack_length=0.1095
        pennation_angle_at_optimal=0.2617994 default_activation=0.05 default_fiber_length=0.1
      PathPoint P1: humerus_l (0.00461 -0.13611 -0.0056)
      PathPoint P2: humerus_l (-0.00208 -0.05381 -0.01859)
      PathPoint P3: thorax (-0.007955 0.02994 -0.18333)
      PathPoint P4: thorax (-0.018785 0.02666 -0.1672)
      PathWrap: wrap_object=Deltoid2_l method=hybrid
      PathWrap: wrap_object=delt2hum_l method=hybrid
      PathWrap: wrap_object=TMAJ_LAT_PEC_CORBhh_l method=hybrid
    Thelen2003Muscle DELT3_l: max_isometric_force=259.88 optimal_fiber_length=0.1367 tendon_slack_length=0.038
        pennation_angle_at_optimal=0.3141593 default_activation=0.05 default_fiber_length=0.1
      PathPoint P1: thorax (-0.063735 0.02822 -0.13588)
      PathPoint P2: thorax (-0.080475 -0.00585 -0.17333)
      PathPoint P3: humerus_l (0.00206 -0.07602 -0.01045)
      PathWrap: wrap_object=Delt3_l method=hybrid
      PathWrap: wrap_object=delt3hum_l method=hybrid
      PathWrap: wrap_object=TMAJ_LAT_PEC_CORBhh_l method=hybrid
    Thelen2003Muscle SUPSP_l: max_isometric_force=487.82 optimal_fiber_length=0.0682 tendon_slack_length=0.0395
        pennation_angle_at_optimal=0.1221731 default_activation=0.05 default_fiber_length=0.1
      PathPoint P1: humerus_l (0.00256 0.01063 -0.02593)
      PathPoint P2: thorax (-0.027185 0.02827 -0.14829)
      PathPoint P3: thorax (-0.052005 0.01188 -0.10245)
      PathWrap: wrap_object=SUPSP_l method=hybrid
    Thelen2003Muscle INFSP_l: max_isometric_force=1210.84 optimal_fiber_length=0.0755 tendon_slack_length=0.0308
        pennation_angle_at_optimal=0.3228859 default_activation=0.05 default_fiber_length=0.1
      PathPoint P1: humerus_l (-0.00887 0.00484 -0.02448)
      PathPoint P2: thorax (-0.081825 -0.02776 -0.11319)
      PathWrap: wrap_object=INFSP_l method=hybrid
      PathWrap: wrap_object=INFSP_and_TMIN_hum_head_l method=hybrid
    Thelen2003Muscle SUBSC_l: max_isometric_force=1377.81 optimal_fiber_length=0.0873 tendon_slack_length=0.033
        pennation_angle_at_optimal=0.3490659 default_activation=0.05 default_fiber_length=0.1
      PathPoint P1: humerus_l (0.01403 0.0084 0.01331)
      PathPoint P2: thorax (-0.026315 -0.02523 -0.13643)
      PathPoint P3: thorax (-0.080465 -0.01243 -0.09625)
      PathWrap: wrap_object=SUBSCAP_l method=hybrid
    Thelen2003Muscle TMIN_l: max_isometric_force=354.25 optimal_fiber_length=0.0741 tendon_slack_length=0.0713
        pennation_angle_at_optimal=0.418879 default_activation=0.05 default_fiber_length=0.1
      PathPoint P1: humerus_l (-0.0011 -0.01264 -0.02156)
      PathPoint P2: thorax (-0.102735 -0.05291 -0.11363)
      PathPoint P3: thorax (-0.104435 -0.05421 -0.10802)
      PathWrap: wrap_object=TMIN_l method=hybrid range=(1 2)
      PathWrap: wrap_object=INFSP_and_TMIN_hum_head_l method=hybrid range=(1 2)
      PathWrap: wrap_object=TMINhum_l method=hybrid range=(1 2)
    Thelen2003Muscle TMAJ_l: max_isometric_force=425.39 optimal_fiber_length=0.1624 tendon_slack_length=0.02
        pennation_angle_at_optimal=0.2792527 default_activation=0.05 default_fiber_length=0.1
      PathPoint P1: humerus_l (0.00998 -0.05419 0.00568)
      PathPoint P2: thorax (-0.110645 -0.07619 -0.10271)
      PathPoint P3: thorax (-0.112895 -0.08195 -0.08983)
      PathWrap: wrap_object=TMAJ_LAThum_l method=hybrid
      PathWrap: wrap_object=LAT_TMAJhh_l method=hybrid range=(1 2)
      PathWrap: wrap_object=LAT_TMAJ2hh_l method=hybrid
    Thelen2003Muscle PECM1_l: max_isometric_force=364.41 optimal_fiber_length=0.1442 tendon_slack_length=0.0028
        pennation_angle_at_optimal=0.296706 default_activation=0.05 default_fiber_length=0.1
      PathPoint P1: humerus_l (0.01169 -0.04191 -0.0078)
      PathPoint P2: humerus_l (0.01615 -0.04045 0.00577)
      PathPoint P3: thorax (0.00958 -0.01509 -0.12664)
      PathPoint P4: thorax (0.009535 0.0068 -0.076595)
      PathWrap: wrap_object=Thorax_l method=hybrid
      PathWrap: wrap_object=PEC12hum_l method=hybrid range=(2 3)
      PathWrap: wrap_object=PEC1hh_l method=hybrid
    Thelen2003Muscle PECM2_l: max_isometric_force=515.41 optimal_fiber_length=0.1385 tendon_slack_length=0.089
        pennation_angle_at_optimal=0.4363323 default_activation=0.05 default_fiber_length=0.1
      PathPoint P1: humerus_l (0.01274 -0.04289 -0.00785)
      PathPoint P2: humerus_l (0.01453 -0.04568 0.00687)
      PathPoint P3: thorax (0.02018 -0.04165 -0.1269)
      PathPoint P4: thorax (0.03091 -0.03922 -0.09705)
      PathPoint P5: thorax (0.02769 -0.04498 -0.02271)
      PathWrap: wrap_object=Thorax method=hybrid
      PathWrap: wrap_object=PEC12hum_l method=hybrid range=(2 3)
      PathWrap: wrap_object=TMAJ_LAT_PEC_CORBhh_l method=hybrid
      PathWrap: wrap_object=PEC23hh_l method=hybrid
    Thelen2003Muscle PECM3_l: max_isometric_force=390.55 optimal_fiber_length=0.1385 tendon_slack_length=0.132
        pennation_angle_at_optimal=0.4363323 default_activation=0.05 default_fiber_length=0.1
      PathPoint P1: humerus_l (0.01269 -0.04375 -0.0075)
      PathPoint P2: humerus_l (0.01243 -0.05157 0.01807)
      PathPoint P3: thorax (0.02984 -0.0707747 -0.1151)
      PathPoint P4: thorax (0.0525 -0.08417 -0.08935)
      PathPoint P5: thorax (0.05724 -0.11654 -0.03787)
      PathWrap: wrap_object=Thorax method=hybrid
      PathWrap: wrap_object=PEC3hum_l method=hybrid range=(2 3)
      PathWrap: wrap_object=PEC23hh_l method=hybrid
    Thelen2003Muscle LAT1_l: max_isometric_force=389.1 optimal_fiber_length=0.254 tendon_slack_length=0.12
        pennation_angle_at_optimal=0.4363323 default_activation=0.05 default_fiber_length=0.1
      PathPoint P1: humerus_l (0.0105 -0.03415 0.00653)
      PathPoint P2: thorax (-0.0917657 -0.0510653 -0.136073)
      PathPoint P3: thorax (-0.120155 -0.07079 -0.10778)
      PathPoint P4: thorax (-0.11828 -0.10118 -0.03316)
      PathPoint P5: thorax (-0.09578 -0.11724 -0.00882)
      PathWrap: wrap_object=TMAJ_LAThum_l method=hybrid
      PathWrap: wrap_object=LAT_TMAJhh_l method=hybrid range=(1 2)
      PathWrap: wrap_object=LAT_TMAJ2hh_l method=hybrid
    Thelen2003Muscle LAT2_l: max_isometric_force=389.1 optimal_fiber_length=0.2324 tendon_slack_length=0.1765
        pennation_angle_at_optimal=0.3316126 default_activation=0.05 default_fiber_length=0.1
      PathPoint P1: humerus_l (0.00968 -0.04071 0.00611)
      PathPoint P2: thorax (-0.086075 -0.07567 -0.13798)
      PathPoint P3: thorax (-0.115965 -0.10593 -0.0868)
      PathPoint P4: thorax (-0.10992 -0.16908 -0.02878)
      PathPoint P5: thorax (-0.07186 -0.18818 -0.00815)
      PathWrap: wrap_object=TMAJ_LAThum_l method=hybrid
      PathWrap: wrap_object=LAT_TMAJhh_l method=hybrid range=(1 2)
      PathWrap: wrap_object=LAT_TMAJ2hh_l method=hybrid
    Thelen2003Muscle LAT3_l: max_isometric_force=281.66 optimal_fiber_length=0.2789 tendon_slack_length=0.1403
        pennation_angle_at_optimal=0.3665191 default_activation=0.05 default_fiber_length=0.1
      PathPoint P1: humerus_l (0.01208 -0.03922 0.00416)
      PathPoint P2: thorax (-0.064785 -0.10603 -0.1397)
      PathPoint P3: thorax (-0.102495 -0.14853 -0.11494)
      PathPoint P4: thorax (-0.11157 -0.19387 -0.05532)
      PathPoint P5: thorax (-0.07117 -0.24858 -0.00907)
      PathWrap: wrap_object=TMAJ_LAThum_l method=hybrid
      PathWrap: wrap_object=LAT_TMAJhh_l method=hybrid range=(1 2)
      PathWrap: wrap_object=LAT_TMAJ2hh_l method=hybrid
    Thelen2003Muscle CORB_l: max_isometric_force=242.46 optimal_fiber_length=0.0932 tendon_slack_length=0.097
        pennation_angle_at_optimal=0 default_activation=0.05 default_fiber_length=0.1
      PathPoint P1: thorax (0.004495 -0.01427 -0.13448)
      PathPoint P2: thorax (-0.003175 -0.04258 -0.14537)
      PathPoint P3: humerus_l (0.00743 -0.15048 0.00782)
      PathWrap: wrap_object=CORBhum_l method=hybrid
      PathWrap: wrap_object=TMAJ_LAT_PEC_CORBhh_l method=hybrid
    Thelen2003Muscle TRIlong_l: max_isometric_force=798.52 optimal_fiber_length=0.134 tendon_slack_length=0.143
        pennation_angle_at_optimal=0.2094395 default_activation=0.05 default_fiber_length=0.1
      PathPoint P1: thorax (-0.053655 -0.01373 -0.14723)
      PathPoint P2: humerus_l (-0.02714 -0.11441 0.00664)
      PathPoint P3: humerus_l (-0.03184 -0.22637 0.01217)
      PathPoint P4: humerus_l (-0.01743 -0.26757 0.01208)
      PathPoint P5: ulna_l (-0.0219 0.01046 0.00078)
      PathWrap: wrap_object=TRI_l method=hybrid
      PathWrap: wrap_object=TRIlonghh_l method=hybrid
      PathWrap: wrap_object=TRIlongglen_l method=hybrid
    Thelen2003Muscle TRIlat_l: max_isometric_force=624.3 optimal_fiber_length=0.1138 tendon_slack_length=0.098
        pennation_angle_at_optimal=0.1570796 default_activation=0.05 default_fiber_length=0.1
      PathPoint P1: humerus_l (-0.00599 -0.12646 -0.00428)
      PathPoint P2: humerus_l (-0.02344 -0.14528 -0.00928)
      PathPoint P3: humerus_l (-0.03184 -0.22637 0.01217)
      PathPoint P4: humerus_l (-0.01743 -0.26757 0.01208)
      PathPoint P5: ulna_l (-0.0219 0.01046 0.00078)
      PathWrap: wrap_object=TRI_l method=hybrid
    Thelen2003Muscle TRImed_l: max_isometric_force=624.3 optimal_fiber_length=0.1138 tendon_slack_length=0.0908
        pennation_angle_at_optimal=0.1570796 default_activation=0.05 default_fiber_length=0.1
      PathPoint P1: humerus_l (-0.00838 -0.13695 0.00906)
      PathPoint P2: humerus_l (-0.02601 -0.15139 0.0108)
      PathPoint P3: humerus_l (-0.03184 -0.22637 0.01217)
      PathPoint P4: humerus_l (-0.01743 -0.26757 0.01208)
      PathPoint P5: ulna_l (-0.0219 0.01046 0.00078)
      PathWrap: wrap_object=TRI_l method=hybrid
    Thelen2003Muscle ANC_l: max_isometric_force=350 optimal_fiber_length=0.027 tendon_slack_length=0.018
        pennation_angle_at_optimal=0 default_activation=0.05 default_fiber_length=0.1
      PathPoint P1: humerus_l (-0.00744 -0.28359 -0.00979)
      PathPoint P2: ulna_l (-0.02532 -0.00124 -0.006)
      PathWrap: wrap_object=ANC_l method=hybrid
    Thelen2003Muscle BIClong_l: max_isometric_force=624.3 optimal_fiber_length=0.1157 tendon_slack_length=0.2723
        pennation_angle_at_optimal=0 default_activation=0.05 default_fiber_length=0.1
      PathPoint P1: thorax (-0.039235 0.00347 -0.14795)
      PathPoint P2: thorax (-0.028945 0.01391 -0.15639)
      PathPoint P3: humerus_l (0.02131 0.01793 -0.01028)
      PathPoint P4: humerus_l (0.02378 -0.00511 -0.01201)
      PathPoint P5: humerus_l (0.01345 -0.02827 -0.00136)
      PathPoint P6: humerus_l (0.01068 -0.07736 0.00165)
      PathPoint P7: humerus_l (0.01703 -0.12125 -0.00024)
      PathPoint P8: humerus_l (0.0228 -0.1754 0.0063)
      PathPoint P9: radius_l (0.01467 -0.0102 0.01062)
      ConditionalPathPoint P10: radius_l (-0.0001 -0.0276 0.0043) range=(-0.638791 1.5708) coordinate=pro_sup_l
      PathPoint P11: radius_l (-0.002 -0.0375 0.002)
      PathWrap: wrap_object=Elbow_BIC_BRD_l method=hybrid
      PathWrap: wrap_object=BIClong_l method=hybrid range=(2 3)
    Thelen2003Muscle BICshort_l: max_isometric_force=435.56 optimal_fiber_length=0.1321 tendon_slack_length=0.1923
        pennation_angle_at_optimal=0 default_activation=0.05 default_fiber_length=0.1
      PathPoint P1: thorax (0.004675 -0.01231 -0.13475)
      PathPoint P2: thorax (-0.007075 -0.04004 -0.14507)
      PathPoint P3: humerus_l (0.01117 -0.07576 0.01101)
      PathPoint P4: humerus_l (0.01703 -0.12125 0.01079)
      PathPoint P5: humerus_l (0.0228 -0.1754 0.0063)
      PathPoint P6: radius_l (0.0146695 -0.0102 0.0106184)
      ConditionalPathPoint P7: radius_l (-0.0001 -0.0276 0.0043) range=(-0.638791 1.5708) coordinate=pro_sup_l
      PathPoint P8: radius_l (-0.002 -0.0375 0.002)
      PathWrap: wrap_object=Elbow_BIC_BRD_l method=hybrid
    Thelen2003Muscle BRA_l: max_isometric_force=987.26 optimal_fiber_length=0.0858 tendon_slack_length=0.0535
        pennation_angle_at_optimal=0 default_activation=0.05 default_fiber_length=0.1
      PathPoint P1: humerus_l (0.0068 -0.1739 0.0036)
      ConditionalPathPoint P2: humerus_l (0.01894 -0.28559 0.01105) range=(0 0.813149) coordinate=elbow_flexion_l
      ConditionalPathPoint P3: ulna_l (0.00498 -0.01463 -0.00128) range=(0 0.813149) coordinate=elbow_flexion_l
      PathPoint P4: ulna_l (-0.0032 -0.0239 -0.0009)
    Thelen2003Muscle BRD_l: max_isometric_force=261.33 optimal_fiber_length=0.1726 tendon_slack_length=0.133
        pennation_angle_at_optimal=0 default_activation=0.05 default_fiber_length=0.1
      PathPoint P1: humerus_l (-0.0098 -0.19963 -0.00223)
      PathPoint P2: radius_l (0.03577 -0.12742 -0.02315)
      PathPoint P3: radius_l (0.0419 -0.221 -0.0224)
      PathWrap: wrap_object=Elbow_BIC_BRD_l method=hybrid
    Thelen2003Muscle ECRL_l: max_isometric_force=304.89 optimal_fiber_length=0.081 tendon_slack_length=0.224
        pennation_angle_at_optimal=0 default_activation=0.05 default_fiber_length=0.1
      PathPoint P1: humerus_l (-0.0073 -0.2609 -0.0091)
      PathPoint P2: radius_l (0.03195 -0.13463 -0.02779)
      PathPoint P3: radius_l (0.04243 -0.23684 -0.0362)
      PathPoint P4: hand_l (0.021167 -0.036274 -0.008159)
      PathWrap: wrap_object=Elbow_PT_ECRL_l method=hybrid
      PathWrap: wrap_object=ECRL_l method=hybrid
    Thelen2003Muscle ECRB_l: max_isometric_force=100.52 optimal_fiber_length=0.0585 tendon_slack_length=0.2223
        pennation_angle_at_optimal=0.1553343 default_activation=0.05 default_fiber_length=0.1
      PathPoint P1: humerus_l (0.01349 -0.29048 -0.01698)
      PathPoint P2: radius_l (0.02905 -0.13086 -0.02385)
      PathPoint P3: radius_l (0.03549 -0.22805 -0.03937)
      PathPoint P4: hand_l (0.008989 -0.026413 -0.010824)
      PathWrap: wrap_object=ECRB_l method=hybrid
    Thelen2003Muscle ECU_l: max_isometric_force=93.17 optimal_fiber_length=0.0622 tendon_slack_length=0.2285
        pennation_angle_at_optimal=0.06108652 default_activation=0.05 default_fiber_length=0.1
      PathPoint P1: humerus_l (0.00083 -0.28955 -0.0188)
      PathPoint P2: ulna_l (-0.01391 -0.03201 -0.02947)
      PathPoint P3: ulna_l (-0.01705 -0.05428 -0.02868)
      PathPoint P4: ulna_l (-0.01793 -0.09573 -0.03278)
      PathPoint P5: radius_l (-0.01421 -0.22696 -0.03481)
      PathPoint P6: hand_l (-0.018514 -0.029067 -0.001049)
      PathWrap: wrap_object=ECU_l method=hybrid
    Thelen2003Muscle FCR_l: max_isometric_force=73.96 optimal_fiber_length=0.0628 tendon_slack_length=0.244
        pennation_angle_at_optimal=0.05410521 default_activation=0.05 default_fiber_length=0.1
      PathPoint P1: humerus_l (0.00758 -0.27806 0.03705)
      PathPoint P2: radius_l (0.0211 -0.21943 -0.00127)
      PathPoint P3: hand_l (0.015227 -0.033494 0.001851)
      PathWrap: wrap_object=Elbow_PT_ECRL_l method=hybrid
      PathWrap: wrap_object=FCR_l method=hybrid
    Thelen2003Muscle FCU_l: max_isometric_force=128.93 optimal_fiber_length=0.0509 tendon_slack_length=0.265
        pennation_angle_at_optimal=0.2111848 default_activation=0.05 default_fiber_length=0.1
      PathPoint P1: humerus_l (0.00219 -0.2774 0.0388)
      PathPoint P2: radius_l (0.00949 -0.1841 -0.0005)
      PathPoint P3: radius_l (0.01082 -0.22327 -0.00969)
      PathPoint P4: hand_l (-0.016364 -0.032707 0.005191)
      PathWrap: wrap_object=FCU_l method=hybrid
      PathWrap: wrap_object=Elbow_PT_ECRL_l method=hybrid
    Thelen2003Muscle PT_l: max_isometric_force=566.22 optimal_fiber_length=0.0492 tendon_slack_length=0.098
        pennation_angle_at_optimal=0.1745329 default_activation=0.05 default_fiber_length=0.1
      PathPoint P1: humerus_l (0.0036 -0.2759 0.0365)
      PathPoint P2: ulna_l (0.00846 -0.03373 0.01432)
      PathPoint P3: radius_l (0.01179 -0.053657 0.022189)
      ConditionalPathPoint P4: radius_l (0.0236 -0.0934 -0.0094) range=(-1.5708 0.509636) coordinate=pro_sup_l
      PathPoint P5: radius_l (0.0254 -0.1088 -0.0198)
      PathWrap: wrap_object=Elbow_PT_ECRL_l method=hybrid
    ObjectGroup R_hip_abd: members=(glut_max1_r glut_med1_r glut_med2_r glut_med3_r peri_r sar_r tfl_r)
    ObjectGroup R_hip_flex: members=(glut_med1_r grac_r iliacus_r pect_r psoas_r rect_fem_r sar_r tfl_r)
    ObjectGroup R_hip_inrot: members=(glut_med1_r iliacus_r psoas_r tfl_r)
    ObjectGroup R_hip_exrot: members=(gem_r glut_med3_r peri_r quad_fem_r)
    ObjectGroup R_hip_ext: members=(add_mag2_r bifemlh_r glut_max1_r glut_max2_r glut_max3_r glut_med3_r)
    ObjectGroup R_hip_add: members=(add_mag2_r bifemlh_r grac_r pect_r)
    ObjectGroup R_knee_bend: members=(bifemlh_r bifemsh_r grac_r med_gas_r sar_r)
    ObjectGroup R_knee_ext: members=(rect_fem_r vas_int_r)
    ObjectGroup R_ankle_pf: members=(med_gas_r soleus_r tib_post_r)
    ObjectGroup R_inverter: members=(tib_ant_r tib_post_r)
    ObjectGroup R_ankle_df: members=tib_ant_r
    ObjectGroup L_hip_abd: members=(glut_max1_l glut_med1_l glut_med2_l glut_med3_l peri_l sar_l tfl_l)
    ObjectGroup L_hip_flex: members=(glut_med1_l grac_l iliacus_l pect_l psoas_l rect_fem_l sar_l tfl_l)
    ObjectGroup L_hip_inrot: members=(glut_med1_l iliacus_l psoas_l tfl_l)
    ObjectGroup L_hip_exrot: members=(gem_l glut_med3_l peri_l quad_fem_l)
    ObjectGroup L_hip_ext: members=(add_mag2_l bifemlh_l glut_max1_l glut_max2_l glut_max3_l glut_med3_l)
    ObjectGroup L_hip_add: members=(add_mag2_l bifemlh_l grac_l pect_l)
    ObjectGroup L_knee_bend: members=(bifemlh_l bifemsh_l grac_l med_gas_l sar_l)
    ObjectGroup L_knee_ext: members=(rect_fem_l vas_int_l)
    ObjectGroup L_ankle_pf: members=(med_gas_l soleus_l tib_post_l)
    ObjectGroup L_inverter: members=(tib_ant_l tib_post_l)
    ObjectGroup L_ankle_df: members=tib_ant_l
    ObjectGroup back_ext: members=(ercspn_l ercspn_r)
    ObjectGroup back_rlb: members=(ercspn_r extobl_r intobl_r)
    ObjectGroup back_introt: members=(ercspn_r extobl_l intobl_r)
    ObjectGroup back_llb: members=(ercspn_l extobl_l intobl_l)
    ObjectGroup back_extrot: members=(ercspn_l extobl_r intobl_l)
    ObjectGroup back_flex: members=(extobl_l extobl_r intobl_l intobl_r)
    ObjectGroup shoulder: members=(CORB DELT1 DELT2 DELT3 INFSP LAT1 LAT2 LAT3 PECM1 PECM2 PECM3 SUBSC SUPSP TMAJ TMIN)
    ObjectGroup elbow: members=(ANC BIClong BICshort BRA BRD ECRL PT TRIlat TRIlong TRImed)
    ObjectGroup wrist: members=(ECRB ECU FCR FCU)
    ObjectGroup shoulder_l: members=(CORB_l DELT1_l DELT2_l DELT3_l INFSP_l LAT1_l LAT2_l LAT3_l PECM1_l PECM2_l PECM3_l SUBSC_l SUPSP_l TMAJ_l TMIN_l)
    ObjectGroup elbow_l: members=(ANC_l BIClong_l BICshort_l BRA_l BRD_l ECRL_l PT_l TRIlat_l TRIlong_l TRImed_l)
    ObjectGroup wrist_l: members=(ECRB_l ECU_l FCR_l FCU_l)
